# OpenSim document version 40500
Model Pose2Sim_scaled:
  gravity: 0 -9.80665 0
  length_units: meters
  force_units: N
  credits:
    Delp S.L., Loan J.P., Hoy M.G., Zajac F.E., Topp E.L., Rosen J.M., Thelen D.G., Anderson F.C., Seth A., Hamner S.R.
  publications:
    Whole body model that consists of 23 bodies, 42 degrees of freedom and 30 muscles. The whole-body geometric model and the lower limbs, pelvis and upper limbs anthropometry are based on the running model of Hammer et al. 2010 which consists of 12 segments and 29 degrees of freedom. Extra segments and degrees of freedom were later added based on Dumas et al. 2007. Muscles …Each lower extremity had seven degrees-of-freedom; the hip was modeled as a ball-and-socket joint (3 dofs), the knee was modeled as a revolute joint with 1 dof, the ankle was modeled as 2 revolute joints and feet toes with one revolute joint. The pelvis joint was model as a free flyer joint (6 dofs) to allow the model to translate and rotate in the 3D space, the lumbar motion was modeled as a ball-and-socket joint (3 dofs) (Anderson and Pandy, 1999) and the neck joint was modeled as a ball-and-socket joint (3 dofs). Mass properties of the torso and head (including the neck) segments were estimated from Dumas et al., 2007. Each arm consisted of 8 degrees-of-freedom; the shoulder was modeled as a ball-and-socket joint (3 dofs), the elbow and forearm rotation were each modeled with revolute joints (1 dof) (Holzbaur et al., 2005), the wrist flexion and deviation were each modeled with revolute joints and the hand fingers were modeled with 1 revolute joint. Mass properties for the arms were estimated from 1 and de Leva, 1996. The model also include 30 superficial muscles of the whole body..
  Ground
  BodySet:
    Body pelvis: mass=10.90346 [kg] mass_center=(-0.08713921 0 0) inertia=(0.144581 0.1225 0.08143229 0 0 0)
        meshes=(sacrum.vtp pelvis.vtp l_pelvis.vtp)
    Body femur_r: mass=8.611483 mass_center=(0 -0.170737 0) inertia=(0.1250453 0.03277887 0.1318626 0 0 0)
        meshes=femur_r.vtp
    Body tibia_r: mass=3.432502 mass_center=(0 -0.1800153 0) inertia=(0.0433801 0.004389653 0.0439826 0 0 0)
        meshes=(tibia_r.vtp fibula_r.vtp)
    Body talus_r: mass=0.09258265 mass_center=(0 0 0) inertia=(0.0004416046 0.0004416046 0.0004416046 0 0 0)
        meshes=talus_rv.vtp
    Body calcn_r: mass=1.157283 mass_center=(0.06906404 0.02071921 0)
        inertia=(0.0006182465 0.001722258 0.001810579 0 0 0) meshes=foot.vtp
    Body toes_r: mass=0.200534 mass_center=(0.02389616 0.004143843 -0.01208621)
        inertia=(4.416046e-5 8.832093e-5 0.0004416046 0 0 0) meshes=bofoot.vtp
    Body femur_l: mass=8.611483 mass_center=(0 -0.170737 0) inertia=(0.1250453 0.03277887 0.1318626 0 0 0)
        meshes=femur_l.vtp
    Body tibia_l: mass=3.432502 mass_center=(0 -0.1800153 0) inertia=(0.0433801 0.004389653 0.0439826 0 0 0)
        meshes=(tibia_l.vtp fibula_l.vtp)
    Body talus_l: mass=0.09258265 mass_center=(0 0 0) inertia=(0.0004416046 0.0004416046 0.0004416046 0 0 0)
        meshes=talus_lv.vtp
    Body calcn_l: mass=1.157283 mass_center=(0.06906404 0.02071921 0)
        inertia=(0.0006182465 0.001722258 0.001810579 0 0 0) meshes=l_foot.vtp
    Body toes_l: mass=0.200534 mass_center=(0.02389616 0.004143843 0.01208621)
        inertia=(4.416046e-5 8.832093e-5 0.0004416046 0 0 0) meshes=l_bofoot.vtp
    Body torso: mass=19.70159 mass_center=(0.002790171 0.228794 0) inertia=(0.5025299 0.5025299 0.6771823 0 0 0)
        meshes=(hat_spine.vtp hat_ribs_scap.vtp)
    Body head_and_neck: mass=4.342126 mass_center=(-0.006 0.149 0)
        inertia=(0.02484307 0.01615706 0.02493566 0.0002093951 0.0002326611 0.0001034056) meshes=(jaw.vtp skull.vtp)
    Body humerus_r: mass=1.881742 mass_center=(0 -0.1255008 0) inertia=(0.006437287 0.002220665 0.007225648 0 0 0)
        meshes=humerus_rv.vtp
    Body ulna_r: mass=0.5624396 mass_center=(0 -0.08488306 0) inertia=(0.001360199 0.0002837957 0.001475462 0 0 0)
        meshes=ulna_rv.vtp
    Body radius_r: mass=0.5624396 mass_center=(0 -0.08488306 0) inertia=(0.001360199 0.0002837957 0.001475462 0 0 0)
        meshes=radius_rv.vtp
    Body lunate_r: mass=0.009258265 mass_center=(0 0 0) inertia=(9.258265e-6 9.258265e-6 9.258265e-6 0 0 0)
        meshes=lunate_rvs.vtp
    Body hand_r: mass=0.4235656 mass_center=(0 -0.04795778 0) inertia=(0.000409621 0.0002511914 0.0006153499 0 0 0)
        meshes=(pisiform_rvs.vtp scaphoid_rvs.vtp triquetrum_rvs.vtp hamate_rvs.vtp capitate_rvs.vtp trapezoid_rvs.vtp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)
    Body fingers_r: mass=0.09258265 mass_center=(0 -0.068095 0) inertia=(0.0009258265 0.0009258265 0.0009258265 0 0 0)
        meshes=(index_proximal_rvs.vtp index_medial_rvs.vtp index_distal_rvs.vtp middle_proximal_rvs.vtp middle_medial_rvs.vtp middle_distal_rvs.vtp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)
    Body humerus_l: mass=1.881742 mass_center=(0 -0.1255008 0) inertia=(0.006437287 0.002220665 0.007225648 0 0 0)
        meshes=humerus_lv.vtp
    Body ulna_l: mass=0.5624396 mass_center=(0 -0.08488306 0) inertia=(0.001360199 0.0002837957 0.001475462 0 0 0)
        meshes=ulna_lv.vtp
    Body radius_l: mass=0.5624396 mass_center=(0 -0.08488306 0) inertia=(0.001360199 0.0002837957 0.001475462 0 0 0)
        meshes=radius_lv.vtp
    Body lunate_l: mass=0.009258265 mass_center=(0 0 0) inertia=(9.258265e-6 9.258265e-6 9.258265e-6 0 0 0)
        meshes=lunate_lvs.vtp
    Body hand_l: mass=0.4235656 mass_center=(0 -0.04795778 0) inertia=(0.000409621 0.0002511914 0.0006153499 0 0 0)
        meshes=(pisiform_lvs.vtp scaphoid_lvs.vtp triquetrum_lvs.vtp hamate_lvs.vtp capitate_lvs.vtp trapezoid_lvs.vtp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)
    Body fingers_l: mass=0.09258265 mass_center=(0 -0.068095 0) inertia=(0.0009258265 0.0009258265 0.0009258265 0 0 0)
        meshes=(index_proximal_lvs.vtp index_medial_lvs.vtp index_distal_lvs.vtp middle_proximal_lvs.vtp middle_medial_lvs.vtp middle_distal_lvs.vtp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)
  JointSet:
    CustomJoint ground_pelvis: socket_parent_frame=ground_offset socket_child_frame=pelvis_offset
      Coordinate pelvis_tilt: default_value=0 range=(-3.1416 3.1416) clamped=true
      Coordinate pelvis_list: default_value=0 range=(-3.1416 3.1416) clamped=true
      Coordinate pelvis_rotation: default_value=0 range=(-3.1416 3.1416) clamped=true
      Coordinate pelvis_tx: default_value=0 range=(-10 10) clamped=true
      Coordinate pelvis_ty: default_value=0 range=(-6 6) clamped=true
      Coordinate pelvis_tz: default_value=0 range=(-5 5) clamped=true
      PhysicalOffsetFrame ground_offset: socket_parent=/ground translation=(0 0 0) [meters]
      PhysicalOffsetFrame pelvis_offset: socket_parent=/bodyset/pelvis translation=(0 0 0)
      SpatialTransform:
        TransformAxis rotation1: coordinates=pelvis_tilt axis=(0 0 1) LinearFunction(coefficients=1 0)
        TransformAxis rotation2: coordinates=pelvis_list axis=(1 0 0) LinearFunction(coefficients=1 0)
        TransformAxis rotation3: coordinates=pelvis_rotation axis=(0 1 0) LinearFunction(coefficients=1 0)
        TransformAxis translation1: coordinates=pelvis_tx axis=(1 0 0) LinearFunction(coefficients=1 0)
        TransformAxis translation2: coordinates=pelvis_ty axis=(0 1 0) LinearFunction(coefficients=1 0)
        TransformAxis translation3: coordinates=pelvis_tz axis=(0 0 1) LinearFunction(coefficients=1 0)
    CustomJoint hip_r: socket_parent_frame=pelvis_offset socket_child_frame=femur_r_offset
      Coordinate hip_flexion_r: default_value=0 range=(-2.618 2.094395) clamped=true
      Coordinate hip_adduction_r: default_value=0 range=(-2.094395 2.094395) clamped=true
      Coordinate hip_rotation_r: default_value=0 range=(-2.094395 2.094395) clamped=true
      PhysicalOffsetFrame pelvis_offset: socket_parent=/bodyset/pelvis translation=(-0.08713921 -0.08146962 0.1029155)
      PhysicalOffsetFrame femur_r_offset: socket_parent=/bodyset/femur_r translation=(0 0 0)
      SpatialTransform: axes_held_at_zero=(translation1 translation2 translation3)
        TransformAxis rotation1: coordinates=hip_flexion_r axis=(0 0 1) LinearFunction(coefficients=1 0)
        TransformAxis rotation2: coordinates=hip_adduction_r axis=(1 0 0) LinearFunction(coefficients=1 0)
        TransformAxis rotation3: coordinates=hip_rotation_r axis=(0 1 0) LinearFunction(coefficients=1 0)
    CustomJoint knee_r: socket_parent_frame=femur_r_offset socket_child_frame=tibia_r_offset
      Coordinate knee_angle_r: default_value=0 range=(-3.1416 0.3491) clamped=true
      PhysicalOffsetFrame femur_r_offset: socket_parent=/bodyset/femur_r translation=(0 -0.3916907 0)
      PhysicalOffsetFrame tibia_r_offset: socket_parent=/bodyset/tibia_r translation=(0 0 0)
      SpatialTransform: axes_held_at_zero=(rotation2 rotation3 translation1 translation2 translation3)
        TransformAxis rotation1: coordinates=knee_angle_r axis=(0 0 1) LinearFunction(coefficients=1 0)
    CustomJoint ankle_r: socket_parent_frame=tibia_r_offset socket_child_frame=talus_r_offset
      Coordinate ankle_angle_r: default_value=0 range=(-1.570796 1.570796) clamped=true
      PhysicalOffsetFrame tibia_r_offset: socket_parent=/bodyset/tibia_r translation=(0 -0.4146042 0)
      PhysicalOffsetFrame talus_r_offset: socket_parent=/bodyset/talus_r translation=(0 0 0)
      SpatialTransform: axes_held_at_zero=(rotation2 rotation3 translation1 translation2 translation3)
        TransformAxis rotation1: coordinates=ankle_angle_r axis=(-0.1050135 -0.1740224 0.9791263)
            LinearFunction(coefficients=1 0)
    CustomJoint subtalar_r: socket_parent_frame=talus_r_offset socket_child_frame=calcn_r_offset
      Coordinate subtalar_angle_r: default_value=0 range=(-1.570796 1.570796) clamped=true
      PhysicalOffsetFrame talus_r_offset: socket_parent=/bodyset/talus_r
          translation=(-0.03368253 -0.02897237 0.005469872)
      PhysicalOffsetFrame calcn_r_offset: socket_parent=/bodyset/calcn_r translation=(0 0 0)
      SpatialTransform: axes_held_at_zero=(rotation2 rotation3 translation1 translation2 translation3)
        TransformAxis rotation1: coordinates=subtalar_angle_r axis=(0.7871796 0.6047475 -0.1209495)
            LinearFunction(coefficients=1 0)
    CustomJoint mtp_r: socket_parent_frame=calcn_r_offset socket_child_frame=toes_r_offset
      Coordinate mtp_angle_r: default_value=0 range=(-1.570796 1.570796) clamped=true
      PhysicalOffsetFrame calcn_r_offset: socket_parent=/bodyset/calcn_r
          translation=(0.1234865 -0.001381281 0.0007458917)
      PhysicalOffsetFrame toes_r_offset: socket_parent=/bodyset/toes_r translation=(0 0 0)
      SpatialTransform: axes_held_at_zero=(rotation2 rotation3 translation1 translation2 translation3)
        TransformAxis rotation1: coordinates=mtp_angle_r axis=(-0.5809544 0 0.8139361) LinearFunction(coefficients=1 0)
    CustomJoint hip_l: socket_parent_frame=pelvis_offset socket_child_frame=femur_l_offset
      Coordinate hip_flexion_l: default_value=0 range=(-2.618 2.094395) clamped=true
      Coordinate hip_adduction_l: default_value=0 range=(-2.094395 2.094395) clamped=true
      Coordinate hip_rotation_l: default_value=0 range=(-2.094395 2.094395) clamped=true
      PhysicalOffsetFrame pelvis_offset: socket_parent=/bodyset/pelvis translation=(-0.08713921 -0.08146962 -0.1029155)
      PhysicalOffsetFrame femur_l_offset: socket_parent=/bodyset/femur_l translation=(0 0 0)
      SpatialTransform: axes_held_at_zero=(translation1 translation2 translation3)
        TransformAxis rotation1: coordinates=hip_flexion_l axis=(0 0 1) LinearFunction(coefficients=1 0)
        TransformAxis rotation2: coordinates=hip_adduction_l axis=(-1 0 0) LinearFunction(coefficients=1 0)
        TransformAxis rotation3: coordinates=hip_rotation_l axis=(0 -1 0) LinearFunction(coefficients=1 0)
    CustomJoint knee_l: socket_parent_frame=femur_l_offset socket_child_frame=tibia_l_offset
      Coordinate knee_angle_l: default_value=0 range=(-3.1416 0.3491) clamped=true
      PhysicalOffsetFrame femur_l_offset: socket_parent=/bodyset/femur_l translation=(0 -0.3916907 0)
      PhysicalOffsetFrame tibia_l_offset: socket_parent=/bodyset/tibia_l translation=(0 0 0)
      SpatialTransform: axes_held_at_zero=(rotation2 rotation3 translation1 translation2 translation3)
        TransformAxis rotation1: coordinates=knee_angle_l axis=(0 0 1) LinearFunction(coefficients=1 0)
    CustomJoint ankle_l: socket_parent_frame=tibia_l_offset socket_child_frame=talus_l_offset
      Coordinate ankle_angle_l: default_value=0 range=(-1.047198 1.047198) clamped=true
      PhysicalOffsetFrame tibia_l_offset: socket_parent=/bodyset/tibia_l translation=(0 -0.4146042 0)
      PhysicalOffsetFrame talus_l_offset: socket_parent=/bodyset/talus_l translation=(0 0 0)
      SpatialTransform: axes_held_at_zero=(rotation2 rotation3 translation1 translation2 translation3)
        TransformAxis rotation1: coordinates=ankle_angle_l axis=(0.1050135 0.1740224 0.9791263)
            LinearFunction(coefficients=1 0)
    CustomJoint subtalar_l: socket_parent_frame=talus_l_offset socket_child_frame=calcn_l_offset
      Coordinate subtalar_angle_l: default_value=0 range=(-1.570796 1.570796) clamped=true
      PhysicalOffsetFrame talus_l_offset: socket_parent=/bodyset/talus_l
          translation=(-0.03368253 -0.02897237 -0.005469872)
      PhysicalOffsetFrame calcn_l_offset: socket_parent=/bodyset/calcn_l translation=(0 0 0)
      SpatialTransform: axes_held_at_zero=(rotation2 rotation3 translation1 translation2 translation3)
        TransformAxis rotation1: coordinates=subtalar_angle_l axis=(-0.7871796 -0.6047475 -0.1209495)
            LinearFunction(coefficients=1 0)
    CustomJoint mtp_l: socket_parent_frame=calcn_l_offset socket_child_frame=toes_l_offset
      Coordinate mtp_angle_l: default_value=0 range=(-1.047198 1.047198) clamped=true
      PhysicalOffsetFrame calcn_l_offset: socket_parent=/bodyset/calcn_l
          translation=(0.1234865 -0.001381281 -0.0007458917)
      PhysicalOffsetFrame toes_l_offset: socket_parent=/bodyset/toes_l translation=(0 0 0)
      SpatialTransform: axes_held_at_zero=(rotation2 rotation3 translation1 translation2 translation3)
        TransformAxis rotation1: coordinates=mtp_angle_l axis=(0.5809544 0 0.8139361) LinearFunction(coefficients=1 0)
    CustomJoint back: socket_parent_frame=pelvis_offset socket_child_frame=torso_offset
      Coordinate lumbar_extension: default_value=0 range=(-1.570796 1.570796) clamped=true
      Coordinate lumbar_bending: default_value=0 range=(-1.570796 1.570796) clamped=true
      Coordinate lumbar_rotation: default_value=0 range=(-1.570796 1.570796) clamped=true
      PhysicalOffsetFrame pelvis_offset: socket_parent=/bodyset/pelvis translation=(-0.1241148 0.1004504 0)
      PhysicalOffsetFrame torso_offset: socket_parent=/bodyset/torso translation=(0 0 0)
      SpatialTransform: axes_held_at_zero=(translation1 translation2 translation3)
        TransformAxis rotation1: coordinates=lumbar_extension axis=(0 0 1) LinearFunction(coefficients=1 0)
        TransformAxis rotation2: coordinates=lumbar_bending axis=(1 0 0) LinearFunction(coefficients=1 0)
        TransformAxis rotation3: coordinates=lumbar_rotation axis=(0 1 0) LinearFunction(coefficients=1 0)
    CustomJoint neck: socket_parent_frame=torso_offset socket_child_frame=head_and_neck_offset
      Coordinate neck_flexion: default_value=0 range=(-1.74533 1.047198) clamped=true
      Coordinate neck_lateral_bending: default_value=0 range=(-0.6 0.6) clamped=true
      Coordinate neck_rotation: default_value=0 range=(-1.2217 1.2217) clamped=true
      PhysicalOffsetFrame torso_offset: socket_parent=/bodyset/torso translation=(-0.009300571 0.4138754 0)
      PhysicalOffsetFrame head_and_neck_offset: socket_parent=/bodyset/head_and_neck translation=(0 0 0)
      SpatialTransform: axes_held_at_zero=(translation1 translation2 translation3)
        TransformAxis rotation1: coordinates=neck_flexion axis=(0 0 1) LinearFunction(coefficients=1 0)
        TransformAxis rotation2: coordinates=neck_lateral_bending axis=(1 0 0) LinearFunction(coefficients=1 0)
        TransformAxis rotation3: coordinates=neck_rotation axis=(0 1 0) LinearFunction(coefficients=1 0)
    CustomJoint acromial_r: socket_parent_frame=torso_offset socket_child_frame=humerus_r_offset
      Coordinate arm_flex_r: default_value=0 range=(-1.570796 3.1416) clamped=false
      Coordinate arm_add_r: default_value=0 range=(-3.8397 1.570796) clamped=false
      Coordinate arm_rot_r: default_value=0 range=(-1.570796 1.570796) clamped=false
      PhysicalOffsetFrame torso_offset: socket_parent=/bodyset/torso translation=(0.00293433 0.3455162 0.1581097)
      PhysicalOffsetFrame humerus_r_offset: socket_parent=/bodyset/humerus_r translation=(0 0 0)
      SpatialTransform: axes_held_at_zero=(translation1 translation2 translation3)
        TransformAxis rotation1: coordinates=arm_flex_r axis=(0 0 1) LinearFunction(coefficients=1 0)
        TransformAxis rotation2: coordinates=arm_add_r axis=(1 0 0) LinearFunction(coefficients=1 0)
        TransformAxis rotation3: coordinates=arm_rot_r axis=(0 1 0) LinearFunction(coefficients=1 0)
    CustomJoint elbow_r: socket_parent_frame=humerus_r_offset socket_child_frame=ulna_r_offset
      Coordinate elbow_flex_r: default_value=0 range=(0 3.1416) clamped=true
      PhysicalOffsetFrame humerus_r_offset: socket_parent=/bodyset/humerus_r
          translation=(0.01002774 -0.2184016 -0.007320156)
      PhysicalOffsetFrame ulna_r_offset: socket_parent=/bodyset/ulna_r translation=(0 0 0)
      SpatialTransform: axes_held_at_zero=(rotation2 rotation3 translation1 translation2 translation3)
        TransformAxis rotation1: coordinates=elbow_flex_r axis=(0.226047 0.022269 0.9738618)
            LinearFunction(coefficients=1 0)
    CustomJoint radioulnar_r: socket_parent_frame=ulna_r_offset socket_child_frame=radius_r_offset
      Coordinate pro_sup_r: default_value=-7.34641e-6 range=(-3.1416 3.1416) clamped=false
      PhysicalOffsetFrame ulna_r_offset: socket_parent=/bodyset/ulna_r
          translation=(-0.004737675 -0.009160539 0.01836967)
      PhysicalOffsetFrame radius_r_offset: socket_parent=/bodyset/radius_r translation=(0 0 0)
      SpatialTransform: axes_held_at_zero=(rotation2 rotation3 translation1 translation2 translation3)
        TransformAxis rotation1: coordinates=pro_sup_r axis=(0.05639803 0.9984065 0.001952)
            LinearFunction(coefficients=1 0)
    CustomJoint radius_lunate_r: socket_parent_frame=radius_r_offset socket_child_frame=lunate_r_offset
      Coordinate wrist_flex_r: default_value=0 range=(-1.5708 1.5708) clamped=true
      PhysicalOffsetFrame radius_r_offset: socket_parent=/bodyset/radius_r
          translation=(-0.00619553 -0.1660975 0.009585218) orientation=(0.1 0 0) [radians]
      PhysicalOffsetFrame lunate_r_offset: socket_parent=/bodyset/lunate_r translation=(0 0 0)
      SpatialTransform: axes_held_at_zero=(rotation2 rotation3 translation1 translation2 translation3)
        TransformAxis rotation1: coordinates=wrist_flex_r axis=(0 0 1) LinearFunction(coefficients=1 0)
    CustomJoint lunate_hand_r: socket_parent_frame=lunate_r_offset socket_child_frame=hand_r_offset
      Coordinate wrist_dev_r: default_value=0 range=(-0.4363323 0.6108652) clamped=true
      PhysicalOffsetFrame lunate_r_offset: socket_parent=/bodyset/lunate_r translation=(0 0 0)
      PhysicalOffsetFrame hand_r_offset: socket_parent=/bodyset/hand_r translation=(0 0 0)
      SpatialTransform: axes_held_at_zero=(rotation1 rotation3 translation1 translation2 translation3)
        TransformAxis rotation2: coordinates=wrist_dev_r axis=(1 0 0) LinearFunction(coefficients=1 0)
    CustomJoint fingers_r: socket_parent_frame=hand_r_offset socket_child_frame=fingers_r_offset
      Coordinate hand_finger_flex_r: default_value=0 range=(-1.5708 1.5708) clamped=true
      PhysicalOffsetFrame hand_r_offset: socket_parent=/bodyset/hand_r translation=(0 -0.05422937 -0.007042776)
      PhysicalOffsetFrame fingers_r_offset: socket_parent=/bodyset/fingers_r translation=(0 0 0)
      SpatialTransform: axes_held_at_zero=(rotation2 rotation3 translation1 translation2 translation3)
        TransformAxis rotation1: coordinates=hand_finger_flex_r axis=(0 0 1) LinearFunction(coefficients=1 0)
    CustomJoint acromial_l: socket_parent_frame=torso_offset socket_child_frame=humerus_l_offset
      Coordinate arm_flex_l: default_value=0 range=(-1.570796 3.1416) clamped=false
      Coordinate arm_add_l: default_value=0 range=(-3.8397 1.570796) clamped=false
      Coordinate arm_rot_l: default_value=0 range=(-1.570796 1.570796) clamped=false
      PhysicalOffsetFrame torso_offset: socket_parent=/bodyset/torso translation=(0.00293433 0.3455162 -0.1581097)
      PhysicalOffsetFrame humerus_l_offset: socket_parent=/bodyset/humerus_l translation=(0 0 0)
      SpatialTransform: axes_held_at_zero=(translation1 translation2 translation3)
        TransformAxis rotation1: coordinates=arm_flex_l axis=(0 0 1) LinearFunction(coefficients=1 0)
        TransformAxis rotation2: coordinates=arm_add_l axis=(-1 0 0) LinearFunction(coefficients=1 0)
        TransformAxis rotation3: coordinates=arm_rot_l axis=(0 -1 0) LinearFunction(coefficients=1 0)
    CustomJoint elbow_l: socket_parent_frame=humerus_l_offset socket_child_frame=ulna_l_offset
      Coordinate elbow_flex_l: default_value=0 range=(0 3.1416) clamped=true
      PhysicalOffsetFrame humerus_l_offset: socket_parent=/bodyset/humerus_l
          translation=(0.01002774 -0.2184016 0.007320156)
      PhysicalOffsetFrame ulna_l_offset: socket_parent=/bodyset/ulna_l translation=(0 0 0)
      SpatialTransform: axes_held_at_zero=(rotation2 rotation3 translation1 translation2 translation3)
        TransformAxis rotation1: coordinates=elbow_flex_l axis=(-0.226047 -0.022269 0.9738618)
            LinearFunction(coefficients=1 0)
    CustomJoint radioulnar_l: socket_parent_frame=ulna_l_offset socket_child_frame=radius_l_offset
      Coordinate pro_sup_l: default_value=0 range=(-3.1416 3.1416) clamped=false
      PhysicalOffsetFrame ulna_l_offset: socket_parent=/bodyset/ulna_l
          translation=(-0.004737675 -0.009160539 -0.01836967)
      PhysicalOffsetFrame radius_l_offset: socket_parent=/bodyset/radius_l translation=(0 0 0)
      SpatialTransform: axes_held_at_zero=(rotation2 rotation3 translation1 translation2 translation3)
        TransformAxis rotation1: coordinates=pro_sup_l axis=(-0.05639803 -0.9984065 0.001952)
            LinearFunction(coefficients=1 0)
    CustomJoint radius_lunate_l: socket_parent_frame=radius_l_offset socket_child_frame=lunate_l_offset
      Coordinate wrist_flex_l: default_value=0 range=(-1.5708 1.5708) clamped=true
      PhysicalOffsetFrame radius_l_offset: socket_parent=/bodyset/radius_l
          translation=(-0.00619553 -0.1660975 -0.009585218)
      PhysicalOffsetFrame lunate_l_offset: socket_parent=/bodyset/lunate_l translation=(0 0 0)
      SpatialTransform: axes_held_at_zero=(rotation2 rotation3 translation1 translation2 translation3)
        TransformAxis rotation1: coordinates=wrist_flex_l axis=(0 0 1) LinearFunction(coefficients=1 0)
    CustomJoint lunate_hand_l: socket_parent_frame=lunate_l_offset socket_child_frame=hand_l_offset
      Coordinate wrist_dev_l: default_value=0 range=(-0.4363323 0.6108652) clamped=true
      PhysicalOffsetFrame lunate_l_offset: socket_parent=/bodyset/lunate_l translation=(0 0 0)
      PhysicalOffsetFrame hand_l_offset: socket_parent=/bodyset/hand_l translation=(0 0 0)
      SpatialTransform: axes_held_at_zero=(rotation1 rotation3 translation1 translation2 translation3)
        TransformAxis rotation2: coordinates=wrist_dev_l axis=(-1 0 0) LinearFunction(coefficients=1 0)
    CustomJoint fingers_l: socket_parent_frame=hand_l_offset socket_child_frame=fingers_l_offset
      Coordinate hand_finger_flex_l: default_value=0 range=(-1.5708 1.5708) clamped=true
      PhysicalOffsetFrame hand_l_offset: socket_parent=/bodyset/hand_l translation=(0 -0.05422937 0.007042776)
      PhysicalOffsetFrame fingers_l_offset: socket_parent=/bodyset/fingers_l translation=(0 0 0)
      SpatialTransform: axes_held_at_zero=(rotation2 rotation3 translation1 translation2 translation3)
        TransformAxis rotation1: coordinates=hand_finger_flex_l axis=(0 0 1) LinearFunction(coefficients=1 0)
  ForceSet:
    Schutte1993Muscle_Deprecated ant_delt_r: max_isometric_force=1142.6 optimal_fiber_length=0.08040853
        tendon_slack_length=0.07661879 pennation_angle_at_optimal=0.3839724 [radians]
      PathPoint DELT1-P1: humerus_r (0.006835706 -0.09065703 0.004463045)
      PathPoint DELT1-P2: humerus_r (0.01238209 -0.08417226 0.003143204)
      PathPoint DELT1-P3: humerus_r (0.03814568 0.01525827 0)
      PathPoint DELT1-P4: torso (0.01860114 0.3627223 0.065104)
    Schutte1993Muscle_Deprecated ant_delt_l: max_isometric_force=1142.6 optimal_fiber_length=0.08032305
        tendon_slack_length=0.07653733 pennation_angle_at_optimal=0.3839724
      PathPoint DELT1-P1: humerus_l (0.006835706 -0.09065703 -0.004463045)
      PathPoint DELT1-P2: humerus_l (0.01238209 -0.08417226 0.003143204)
      PathPoint DELT1-P3: humerus_l (0.03814568 0.01525827 0)
      PathPoint DELT1-P4: torso (0.01860114 0.3627223 -0.065104)
    Schutte1993Muscle_Deprecated medial_delt_l: max_isometric_force=1142.6 optimal_fiber_length=0.07784298
        tendon_slack_length=0.07417415 pennation_angle_at_optimal=0.3839724
      PathPoint DELT1-P1: humerus_l (0.006835706 -0.09065703 -0.004463045)
      PathPoint DELT1-P2: humerus_l (0.01220662 0.01907284 -0.02288741)
      PathPoint DELT1-P3: torso (0.01860114 0.3813234 -0.1255577)
    Schutte1993Muscle_Deprecated post_delt_r: max_isometric_force=259.88 optimal_fiber_length=0.1190812
        tendon_slack_length=0.03310231 pennation_angle_at_optimal=0.3141593
      PathPoint DELT1-P1: humerus_r (0.006835706 -0.09065703 0.004463045)
      PathPoint DELT1-P2: humerus_r (-0.01238209 -0.08417226 0.003143204)
      PathPoint DELT1-P3: torso (-0.065104 0.2790171 0.1395086)
      PathPoint DELT1-P3_0: torso (-0.065104 0.32552 0.09300571)
    Schutte1993Muscle_Deprecated post_delt_l: max_isometric_force=259.88 optimal_fiber_length=0.1190812
        tendon_slack_length=0.03310231 pennation_angle_at_optimal=0.3141593
      PathPoint DELT1-P1: humerus_l (0.006835706 -0.09065703 -0.004463045)
      PathPoint DELT1-P2: humerus_l (-0.01238209 -0.08417226 -0.003143204)
      PathPoint DELT1-P3: torso (-0.065104 0.2790171 -0.1395086)
      PathPoint DELT1-P3_0: torso (-0.065104 0.32552 -0.09300571)
    Schutte1993Muscle_Deprecated medial_delt_r: max_isometric_force=1142.6 optimal_fiber_length=0.07784298
        tendon_slack_length=0.07417415 pennation_angle_at_optimal=0.3839724
      PathPoint DELT1-P1: humerus_r (0.006835706 -0.09065703 0.004463045)
      PathPoint DELT1-P2: humerus_r (0.01220662 0.01907284 0.02288741)
      PathPoint DELT1-P3: torso (0.01860114 0.3813234 0.1255577)
    Thelen2003Muscle glut_med1_r: max_isometric_force=819 optimal_fiber_length=0.06335273
        tendon_slack_length=0.09236472 pennation_angle_at_optimal=0.1396263 [radians] FmaxTendonStrain=0.033
        FmaxMuscleStrain=0.6 KshapeActive=0.5 KshapePassive=4 Af=0.3 Flen=1.8 activation_time_constant=0.01 [seconds]
        deactivation_time_constant=0.04 [seconds]
      PathPoint P1: pelvis (-0.05028684 0.03746863 0.1490118)
      PathPoint P2: femur_r (-0.0218945 -0.01175072 0.05574059)
    Thelen2003Muscle semiten_r: max_isometric_force=410 optimal_fiber_length=0.1959133 tendon_slack_length=0.249034
        pennation_angle_at_optimal=0.08726646 FmaxTendonStrain=0.033 FmaxMuscleStrain=0.6 KshapeActive=0.5
        KshapePassive=4 Af=0.3 Flen=1.8 activation_time_constant=0.01 deactivation_time_constant=0.04
      PathPoint P1: pelvis (-0.155729 -0.1354294 0.07443192)
      ConditionalPathPoint P2: tibia_r (-0.04052515 -0.02756636 -0.02195474)
          socket_coordinate=/jointset/knee_r/knee_angle_r range=(-0.331613 0.174533) [radians]
      PathPoint P3: tibia_r (-0.03203058 -0.05092882 -0.0220608)
      PathPoint P4: tibia_r (-0.01089541 -0.071929 -0.0236228)
      PathPoint P5: tibia_r (0.002603328 -0.09217711 -0.01860898)
    Thelen2003Muscle bifemlh_r: max_isometric_force=896 optimal_fiber_length=0.1070605 tendon_slack_length=0.3201994
        pennation_angle_at_optimal=0 FmaxTendonStrain=0.033 FmaxMuscleStrain=0.6 KshapeActive=0.5 KshapePassive=4
        Af=0.3 Flen=1.8 activation_time_constant=0.01 deactivation_time_constant=0.04
      PathPoint P1: pelvis (-0.1552483 -0.1264196 0.08558624)
      PathPoint P2: tibia_r (-0.02902229 -0.03471105 0.02837628)
      PathPoint P3: tibia_r (-0.02256218 -0.05428422 0.03307191)
    Thelen2003Muscle sar_r: max_isometric_force=156 optimal_fiber_length=0.5353757 tendon_slack_length=0.1029569
        pennation_angle_at_optimal=0 FmaxTendonStrain=0.033 FmaxMuscleStrain=0.6 KshapeActive=0.5 KshapePassive=4
        Af=0.3 Flen=1.8 activation_time_constant=0.01 deactivation_time_constant=0.04
      PathPoint P1: pelvis (-0.01885757 -0.001602277 0.1530791)
      PathPoint P2: femur_r (-0.003013005 -0.3583467 -0.0422825)
      PathPoint P3: tibia_r (-0.005399496 -0.0403998 -0.03847141)
      PathPoint P4: tibia_r (0.005785174 -0.05679113 -0.0369287)
      PathPoint P5: tibia_r (0.02342996 -0.08099244 -0.02429773)
    Thelen2003Muscle tfl_r: max_isometric_force=233 optimal_fiber_length=0.09866687 tendon_slack_length=0.4414044
        pennation_angle_at_optimal=0.05235988 FmaxTendonStrain=0.033 FmaxMuscleStrain=0.6 KshapeActive=0.5
        KshapePassive=4 Af=0.3 Flen=1.8 activation_time_constant=0.01 deactivation_time_constant=0.04
      PathPoint P1: pelvis (-0.03833139 0.02637594 0.1529558)
      PathPoint P2: femur_r (0.02952745 -0.09993133 0.0599588)
      PathPoint P3: femur_r (0.005423409 -0.4066553 0.03585476)
      PathPoint P4: tibia_r (0.005785174 -0.04695633 0.02863661)
    Thelen2003Muscle vas_med_r: max_isometric_force=1294 optimal_fiber_length=0.08954317 tendon_slack_length=0.126769
        pennation_angle_at_optimal=0.08726646 FmaxTendonStrain=0.033 FmaxMuscleStrain=0.6 KshapeActive=0.5
        KshapePassive=4 Af=0.3 Flen=1.8 activation_time_constant=0.01 deactivation_time_constant=0.04
      PathPoint P1: femur_r (0.01406069 -0.2108099 0.0188815)
      PathPoint P2: femur_r (0.03575433 -0.2781004 0.0009039015)
      ConditionalPathPoint P3: femur_r (0.0371604 -0.4065548 -0.01255419)
          socket_coordinate=/jointset/knee_r/knee_angle_r range=(-2.61799 -1.21004)
      ConditionalPathPoint P4: femur_r (0.02751878 -0.4273446 -0.01315679)
          socket_coordinate=/jointset/knee_r/knee_angle_r range=(-2.61799 -1.78006)
      MovingPathPoint P5: tibia_r socket_x_coordinate=/jointset/knee_r/knee_angle_r
          socket_y_coordinate=/jointset/knee_r/knee_angle_r socket_z_coordinate=/jointset/knee_r/knee_angle_r
        x_location: MultiplierFunction: scale=0.9641957
          SimmSpline: x=(-2.0944 -1.99997 -1.5708 -1.45752 -1.39626 -1.0472 -0.698132 -0.526391 -0.349066 -0.174533 0 0.00017453 0.00034907 0.0279253 0.0872665 0.174533 2.0944)
              y=(0.00981097 0.0122243 0.0217371 0.0238851 0.0249902 0.0307959 0.0364187 0.0392871 0.0425654 0.0475764 0.0559586 0.0559681 0.0559776 0.0575419 0.0613368 0.0679503 0.0629332)
        y_location: MultiplierFunction: scale=0.9641957
          SimmSpline: x=(-2.0944 -1.99997 -1.5708 -1.45752 -1.39626 -1.0472 -0.698132 -0.526391 -0.349066 -0.174533 0 0.00017453 0.00034907 0.0279253 0.0872665 0.174533 2.0944)
              y=(0.0224154 0.0227651 0.0241265 0.0242933 0.0243287 0.0239462 0.0233593 0.0230677 0.0228342 0.0226362 0.0217917 0.0217903 0.0217889 0.0215365 0.0206842 0.0183269 -0.0656205)
        z_location: MultiplierFunction: scale=0.9641957
          SimmSpline: x=(-2.0944 2.0944) y=(-0.0146 -0.0146)
    Thelen2003Muscle vas_lat_r: max_isometric_force=1871 optimal_fiber_length=0.08446357 tendon_slack_length=0.1578664
        pennation_angle_at_optimal=0.08726646 FmaxTendonStrain=0.033 FmaxMuscleStrain=0.6 KshapeActive=0.5
        KshapePassive=4 Af=0.3 Flen=1.8 activation_time_constant=0.01 deactivation_time_constant=0.04
      PathPoint P1: femur_r (0.004820808 -0.1862037 0.03505129)
      PathPoint P2: femur_r (0.02701661 -0.2602232 0.0410773)
      ConditionalPathPoint P3: femur_r (0.03625649 -0.404747 0.02058887)
          socket_coordinate=/jointset/knee_r/knee_angle_r range=(-2.61799 -1.21004)
      ConditionalPathPoint P4: femur_r (0.02540968 -0.4261394 0.01847976)
          socket_coordinate=/jointset/knee_r/knee_angle_r range=(-2.61799 -1.92004)
      MovingPathPoint P5: tibia_r socket_x_coordinate=/jointset/knee_r/knee_angle_r
          socket_y_coordinate=/jointset/knee_r/knee_angle_r socket_z_coordinate=/jointset/knee_r/knee_angle_r
        x_location: MultiplierFunction: scale=0.9641957
          SimmSpline: x=(-2.0944 -1.99997 -1.5708 -1.45752 -1.39626 -1.0472 -0.698132 -0.526391 -0.349066 -0.174533 0 0.00017453 0.00034907 0.0279253 0.0872665 0.174533 2.0944)
              y=(0.0142897 0.016703 0.0262145 0.0283623 0.0294674 0.0352709 0.0408785 0.0437291 0.0469704 0.0518742 0.0599557 0.0599647 0.0599738 0.0614577 0.0650351 0.0711867 0.0583766)
        y_location: MultiplierFunction: scale=0.9641957
          SimmSpline: x=(-2.0944 -1.99997 -1.5708 -1.45752 -1.39626 -1.0472 -0.698132 -0.526391 -0.349066 -0.174533 0 0.00017453 0.00034907 0.0279253 0.0872665 0.174533 2.0944)
              y=(0.0215318 0.0218815 0.0232362 0.0234019 0.0234371 0.0230439 0.0223842 0.0220151 0.0216359 0.0210971 0.0195864 0.0195842 0.019582 0.01919 0.018008 0.0151073 -0.0653421)
        z_location: MultiplierFunction: scale=0.9641957
          SimmSpline: x=(-2.0944 2.0944) y=(0.0165 0.0165)
    Thelen2003Muscle med_gas_r: max_isometric_force=1558 optimal_fiber_length=0.0574132 tendon_slack_length=0.3731858
        pennation_angle_at_optimal=0.296706 FmaxTendonStrain=0.033 FmaxMuscleStrain=0.6 KshapeActive=0.5
        KshapePassive=4 Af=0.3 Flen=1.8 activation_time_constant=0.01 deactivation_time_constant=0.04
      PathPoint P1: femur_r (-0.01908237 -0.3946032 -0.02360187)
      ConditionalPathPoint P2: femur_r (-0.03013005 -0.4039435 -0.02591184)
          socket_coordinate=/jointset/knee_r/knee_angle_r range=(-0.785398 0.174533)
      PathPoint P3: calcn_r (0 0.02140985 -0.003660394)
    Thelen2003Muscle lat_gas_r: max_isometric_force=683 optimal_fiber_length=0.06122949 tendon_slack_length=0.3635501
        pennation_angle_at_optimal=0.1396263 FmaxTendonStrain=0.033 FmaxMuscleStrain=0.6 KshapeActive=0.5
        KshapePassive=4 Af=0.3 Flen=1.8 activation_time_constant=0.01 deactivation_time_constant=0.04
      PathPoint P1: femur_r (-0.02209537 -0.3963106 0.02731791)
      ConditionalPathPoint P2: femur_r (-0.03013005 -0.4035418 0.02751878)
          socket_coordinate=/jointset/knee_r/knee_angle_r range=(-0.785398 0.174533)
      PathPoint P3: calcn_r (0 0.02140985 -0.003660394)
    Thelen2003Muscle soleus_r: max_isometric_force=3549 optimal_fiber_length=0.04739032 tendon_slack_length=0.2369516
        pennation_angle_at_optimal=0.4363323 FmaxTendonStrain=0.033 FmaxMuscleStrain=0.6 KshapeActive=0.5
        KshapePassive=4 Af=0.3 Flen=1.8 activation_time_constant=0.01 deactivation_time_constant=0.04
      PathPoint P1: tibia_r (-0.00231407 -0.1478112 0.00684579)
      PathPoint P2: calcn_r (0 0.02140985 -0.003660394)
    Thelen2003Muscle tib_post_r: max_isometric_force=1588 optimal_fiber_length=0.02883831 tendon_slack_length=0.2883831
        pennation_angle_at_optimal=0.2094395 FmaxTendonStrain=0.033 FmaxMuscleStrain=0.6 KshapeActive=0.5
        KshapePassive=4 Af=0.3 Flen=1.8 activation_time_constant=0.01 deactivation_time_constant=0.04
      PathPoint P1: tibia_r (-0.00906344 -0.1299736 0.001831972)
      PathPoint P2: tibia_r (-0.01388442 -0.3905957 -0.02208008)
      PathPoint P3: calcn_r (0.02879971 0.02306739 -0.01975232)
      PathPoint P4: calcn_r (0.05331744 0.01098118 -0.019407)
    Thelen2003Muscle tib_ant_r: max_isometric_force=905 optimal_fiber_length=0.09005709 tendon_slack_length=0.2049258
        pennation_angle_at_optimal=0.08726646 FmaxTendonStrain=0.033 FmaxMuscleStrain=0.6 KshapeActive=0.5
        KshapePassive=4 Af=0.3 Flen=1.8 activation_time_constant=0.01 deactivation_time_constant=0.04
      PathPoint P1: tibia_r (0.0172591 -0.1565854 0.01108825)
      PathPoint P2: tibia_r (0.03172204 -0.3809537 -0.01706626)
      PathPoint P3: calcn_r (0.08052868 0.0122934 -0.02106453)
    Thelen2003Muscle per_long_r: max_isometric_force=943 optimal_fiber_length=0.04370658 tendon_slack_length=0.30773
        pennation_angle_at_optimal=0.1745329 FmaxTendonStrain=0.033 FmaxMuscleStrain=0.6 KshapeActive=0.5
        KshapePassive=4 Af=0.3 Flen=1.8 activation_time_constant=0.01 deactivation_time_constant=0.04
      PathPoint P1: tibia_r (0.0004820979 -0.1511859 0.03490389)
      PathPoint P2: tibia_r (-0.01995885 -0.4054443 0.027576)
      PathPoint P3: tibia_r (-0.01561997 -0.4164361 0.02786526)
      PathPoint P4: calcn_r (0.03025005 0.01588473 0.01526315)
      PathPoint P5: calcn_r (0.04703261 0.007320789 0.01961419)
      PathPoint P6: calcn_r (0.05884257 0.004765419 0.008149557)
      PathPoint P7: calcn_r (0.08308404 0.005870444 -0.01270778)
    Thelen2003Muscle glut_med1_l: max_isometric_force=819 optimal_fiber_length=0.06335273
        tendon_slack_length=0.09236472 pennation_angle_at_optimal=0.1396263 FmaxTendonStrain=0.033 FmaxMuscleStrain=0.6
        KshapeActive=0.5 KshapePassive=4 Af=0.3 Flen=1.8 activation_time_constant=0.01 deactivation_time_constant=0.04
      PathPoint P1: pelvis (-0.05028684 0.03746863 -0.1490118)
      PathPoint P2: femur_l (-0.0218945 -0.01175072 -0.05574059)
    Thelen2003Muscle semiten_l: max_isometric_force=410 optimal_fiber_length=0.1959133 tendon_slack_length=0.249034
        pennation_angle_at_optimal=0.08726646 FmaxTendonStrain=0.033 FmaxMuscleStrain=0.6 KshapeActive=0.5
        KshapePassive=4 Af=0.3 Flen=1.8 activation_time_constant=0.01 deactivation_time_constant=0.04
      PathPoint P1: pelvis (-0.155729 -0.1354294 -0.07443192)
      ConditionalPathPoint P2: tibia_l (-0.04052515 -0.02756636 0.02195474)
          socket_coordinate=/jointset/knee_l/knee_angle_l range=(-0.331613 0.174533)
      PathPoint P3: tibia_l (-0.03203058 -0.05092882 0.0220608)
      PathPoint P4: tibia_l (-0.01089541 -0.071929 0.0236228)
      PathPoint P5: tibia_l (0.002603328 -0.09217711 0.01860898)
    Thelen2003Muscle bifemlh_l: max_isometric_force=896 optimal_fiber_length=0.1070605 tendon_slack_length=0.3201994
        pennation_angle_at_optimal=0 FmaxTendonStrain=0.033 FmaxMuscleStrain=0.6 KshapeActive=0.5 KshapePassive=4
        Af=0.3 Flen=1.8 activation_time_constant=0.01 deactivation_time_constant=0.04
      PathPoint P1: pelvis (-0.1552483 -0.1264196 -0.08558624)
      PathPoint P2: tibia_l (-0.02902229 -0.03471105 -0.02837628)
      PathPoint P3: tibia_l (-0.02256218 -0.05428422 -0.03307191)
    Thelen2003Muscle sar_l: max_isometric_force=156 optimal_fiber_length=0.5353757 tendon_slack_length=0.1029569
        pennation_angle_at_optimal=0 FmaxTendonStrain=0.033 FmaxMuscleStrain=0.6 KshapeActive=0.5 KshapePassive=4
        Af=0.3 Flen=1.8 activation_time_constant=0.01 deactivation_time_constant=0.04
      PathPoint P1: pelvis (-0.01885757 -0.001602277 -0.1530791)
      PathPoint P2: femur_l (-0.003013005 -0.3583467 0.0422825)
      PathPoint P3: tibia_l (-0.005399496 -0.0403998 0.03847141)
      PathPoint P4: tibia_l (0.005785174 -0.05679113 0.0369287)
      PathPoint P5: tibia_l (0.02342996 -0.08099244 0.02429773)
    Thelen2003Muscle tfl_l: max_isometric_force=233 optimal_fiber_length=0.09866687 tendon_slack_length=0.4414044
        pennation_angle_at_optimal=0.05235988 FmaxTendonStrain=0.033 FmaxMuscleStrain=0.6 KshapeActive=0.5
        KshapePassive=4 Af=0.3 Flen=1.8 activation_time_constant=0.01 deactivation_time_constant=0.04
      PathPoint P1: pelvis (-0.03833139 0.02637594 -0.1529558)
      PathPoint P2: femur_l (0.02952745 -0.09993133 -0.0599588)
      PathPoint P3: femur_l (0.005423409 -0.4066553 -0.03585476)
      PathPoint P4: tibia_l (0.005785174 -0.04695633 -0.02863661)
    Thelen2003Muscle vas_med_l: max_isometric_force=1294 optimal_fiber_length=0.08954317 tendon_slack_length=0.126769
        pennation_angle_at_optimal=0.08726646 FmaxTendonStrain=0.033 FmaxMuscleStrain=0.6 KshapeActive=0.5
        KshapePassive=4 Af=0.3 Flen=1.8 activation_time_constant=0.01 deactivation_time_constant=0.04
      PathPoint P1: femur_l (0.01406069 -0.2108099 -0.0188815)
      PathPoint P2: femur_l (0.03575433 -0.2781004 -0.0009039015)
      ConditionalPathPoint P3: femur_l (0.0371604 -0.4065548 0.01255419)
          socket_coordinate=/jointset/knee_l/knee_angle_l range=(-2.61799 -1.21004)
      ConditionalPathPoint P4: femur_l (0.02751878 -0.4273446 0.01315679)
          socket_coordinate=/jointset/knee_l/knee_angle_l range=(-2.61799 -1.78006)
      MovingPathPoint P5: tibia_l socket_x_coordinate=/jointset/knee_l/knee_angle_l
          socket_y_coordinate=/jointset/knee_l/knee_angle_l socket_z_coordinate=/jointset/knee_l/knee_angle_l
        x_location: MultiplierFunction: scale=0.9641957
          SimmSpline: x=(-2.0944 -1.99997 -1.5708 -1.45752 -1.39626 -1.0472 -0.698132 -0.526391 -0.349066 -0.174533 0 0.00017453 0.00034907 0.0279253 0.0872665 0.174533 2.0944)
              y=(0.00981097 0.0122243 0.0217371 0.0238851 0.0249902 0.0307959 0.0364187 0.0392871 0.0425654 0.0475764 0.0559586 0.0559681 0.0559776 0.0575419 0.0613368 0.0679503 0.0629332)
        y_location: MultiplierFunction: scale=0.9641957
          SimmSpline: x=(-2.0944 -1.99997 -1.5708 -1.45752 -1.39626 -1.0472 -0.698132 -0.526391 -0.349066 -0.174533 0 0.00017453 0.00034907 0.0279253 0.0872665 0.174533 2.0944)
              y=(0.0224154 0.0227651 0.0241265 0.0242933 0.0243287 0.0239462 0.0233593 0.0230677 0.0228342 0.0226362 0.0217917 0.0217903 0.0217889 0.0215365 0.0206842 0.0183269 -0.0656205)
        z_location: MultiplierFunction: scale=0.9641957
          SimmSpline: x=(-2.0944 2.0944) y=(0.0146 0.0146)
    Thelen2003Muscle vas_lat_l: max_isometric_force=1871 optimal_fiber_length=0.08446357 tendon_slack_length=0.1578664
        pennation_angle_at_optimal=0.08726646 FmaxTendonStrain=0.033 FmaxMuscleStrain=0.6 KshapeActive=0.5
        KshapePassive=4 Af=0.3 Flen=1.8 activation_time_constant=0.01 deactivation_time_constant=0.04
      PathPoint P1: femur_l (0.004820808 -0.1862037 -0.03505129)
      PathPoint P2: femur_l (0.02701661 -0.2602232 -0.0410773)
      ConditionalPathPoint P3: femur_l (0.03625649 -0.404747 -0.02058887)
          socket_coordinate=/jointset/knee_l/knee_angle_l range=(-2.61799 -1.21004)
      ConditionalPathPoint P4: femur_l (0.02540968 -0.4261394 -0.01847976)
          socket_coordinate=/jointset/knee_l/knee_angle_l range=(-2.61799 -1.92004)
      MovingPathPoint P5: tibia_l socket_x_coordinate=/jointset/knee_l/knee_angle_l
          socket_y_coordinate=/jointset/knee_l/knee_angle_l socket_z_coordinate=/jointset/knee_l/knee_angle_l
        x_location: MultiplierFunction: scale=0.9641957
          SimmSpline: x=(-2.0944 -1.99997 -1.5708 -1.45752 -1.39626 -1.0472 -0.698132 -0.526391 -0.349066 -0.174533 0 0.00017453 0.00034907 0.0279253 0.0872665 0.174533 2.0944)
              y=(0.0142897 0.016703 0.0262145 0.0283623 0.0294674 0.0352709 0.0408785 0.0437291 0.0469704 0.0518742 0.0599557 0.0599647 0.0599738 0.0614577 0.0650351 0.0711867 0.0583766)
        y_location: MultiplierFunction: scale=0.9641957
          SimmSpline: x=(-2.0944 -1.99997 -1.5708 -1.45752 -1.39626 -1.0472 -0.698132 -0.526391 -0.349066 -0.174533 0 0.00017453 0.00034907 0.0279253 0.0872665 0.174533 2.0944)
              y=(0.0215318 0.0218815 0.0232362 0.0234019 0.0234371 0.0230439 0.0223842 0.0220151 0.0216359 0.0210971 0.0195864 0.0195842 0.019582 0.01919 0.018008 0.0151073 -0.0653421)
        z_location: MultiplierFunction: scale=0.9641957
          SimmSpline: x=(-2.0944 2.0944) y=(-0.0165 -0.0165)
    Thelen2003Muscle med_gas_l: max_isometric_force=1558 optimal_fiber_length=0.0574132 tendon_slack_length=0.3731858
        pennation_angle_at_optimal=0.296706 FmaxTendonStrain=0.033 FmaxMuscleStrain=0.6 KshapeActive=0.5
        KshapePassive=4 Af=0.3 Flen=1.8 activation_time_constant=0.01 deactivation_time_constant=0.04
      PathPoint P1: femur_l (-0.01908237 -0.3946032 0.02360187)
      ConditionalPathPoint P2: femur_l (-0.03013005 -0.4039435 0.02591184)
          socket_coordinate=/jointset/knee_l/knee_angle_l range=(-0.785398 0.174533)
      PathPoint P3: calcn_l (0 0.02140985 0.003660394)
    Thelen2003Muscle lat_gas_l: max_isometric_force=683 optimal_fiber_length=0.06122949 tendon_slack_length=0.3635501
        pennation_angle_at_optimal=0.1396263 FmaxTendonStrain=0.033 FmaxMuscleStrain=0.6 KshapeActive=0.5
        KshapePassive=4 Af=0.3 Flen=1.8 activation_time_constant=0.01 deactivation_time_constant=0.04
      PathPoint P1: femur_l (-0.02209537 -0.3963106 -0.02731791)
      ConditionalPathPoint P2: femur_l (-0.03013005 -0.4035418 -0.02751878)
          socket_coordinate=/jointset/knee_l/knee_angle_l range=(-0.785398 0.174533)
      PathPoint P3: calcn_l (0 0.02140985 0.003660394)
    Thelen2003Muscle soleus_l: max_isometric_force=3549 optimal_fiber_length=0.04739032 tendon_slack_length=0.2369516
        pennation_angle_at_optimal=0.4363323 FmaxTendonStrain=0.033 FmaxMuscleStrain=0.6 KshapeActive=0.5
        KshapePassive=4 Af=0.3 Flen=1.8 activation_time_constant=0.01 deactivation_time_constant=0.04
      PathPoint P1: tibia_l (-0.00231407 -0.1478112 -0.00684579)
      PathPoint P2: calcn_l (0 0.02140985 0.003660394)
    Thelen2003Muscle tib_post_l: max_isometric_force=1588 optimal_fiber_length=0.02883831 tendon_slack_length=0.2883831
        pennation_angle_at_optimal=0.2094395 FmaxTendonStrain=0.033 FmaxMuscleStrain=0.6 KshapeActive=0.5
        KshapePassive=4 Af=0.3 Flen=1.8 activation_time_constant=0.01 deactivation_time_constant=0.04
      PathPoint P1: tibia_l (-0.00906344 -0.1299736 -0.001831972)
      PathPoint P2: tibia_l (-0.01388442 -0.3905957 0.02208008)
      PathPoint P3: calcn_l (0.02879971 0.02306739 0.01975232)
      PathPoint P4: calcn_l (0.05331744 0.01098118 0.019407)
    Thelen2003Muscle tib_ant_l: max_isometric_force=905 optimal_fiber_length=0.09005709 tendon_slack_length=0.2049258
        pennation_angle_at_optimal=0.08726646 FmaxTendonStrain=0.033 FmaxMuscleStrain=0.6 KshapeActive=0.5
        KshapePassive=4 Af=0.3 Flen=1.8 activation_time_constant=0.01 deactivation_time_constant=0.04
      PathPoint P1: tibia_l (0.0172591 -0.1565854 -0.01108825)
      PathPoint P2: tibia_l (0.03172204 -0.3809537 0.01706626)
      PathPoint P3: calcn_l (0.08052868 0.0122934 0.02106453)
    Thelen2003Muscle per_long_l: max_isometric_force=943 optimal_fiber_length=0.04370658 tendon_slack_length=0.30773
        pennation_angle_at_optimal=0.1745329 FmaxTendonStrain=0.033 FmaxMuscleStrain=0.6 KshapeActive=0.5
        KshapePassive=4 Af=0.3 Flen=1.8 activation_time_constant=0.01 deactivation_time_constant=0.04
      PathPoint P1: tibia_l (0.0004820979 -0.1511859 -0.03490389)
      PathPoint P2: tibia_l (-0.01995885 -0.4054443 -0.027576)
      PathPoint P3: tibia_l (-0.01561997 -0.4164361 -0.02786526)
      PathPoint P4: calcn_l (0.03025005 0.01588473 -0.01526315)
      PathPoint P5: calcn_l (0.04703261 0.007320789 -0.01961419)
      PathPoint P6: calcn_l (0.05884257 0.004765419 -0.008149557)
      PathPoint P7: calcn_l (0.08308404 0.005870444 0.01270778)
    Thelen2003Muscle ercspn_r: max_isometric_force=2500 optimal_fiber_length=0.1217872 tendon_slack_length=0.03044681
        pennation_angle_at_optimal=0 FmaxTendonStrain=0.033 FmaxMuscleStrain=0.6 KshapeActive=0.5 KshapePassive=4
        Af=0.3 Flen=1.8 activation_time_constant=0.01 deactivation_time_constant=0.04
      PathPoint P1: pelvis (-0.1725529 0.05410766 0.0537379)
      PathPoint P2: torso (-0.05115314 0.1023063 0.02241438)
    Thelen2003Muscle ercspn_l: max_isometric_force=2500 optimal_fiber_length=0.1217872 tendon_slack_length=0.03044681
        pennation_angle_at_optimal=0 FmaxTendonStrain=0.033 FmaxMuscleStrain=0.6 KshapeActive=0.5 KshapePassive=4
        Af=0.3 Flen=1.8 activation_time_constant=0.01 deactivation_time_constant=0.04
      PathPoint P1: pelvis (-0.1725529 0.05410766 -0.0537379)
      PathPoint P2: torso (-0.05115314 0.1023063 -0.02241438)
    Thelen2003Muscle rect_abd_r: max_isometric_force=263 optimal_fiber_length=0.2358064 tendon_slack_length=0.01791201
      PathPoint P1: pelvis (-0.05125105 -0.09860166 0.01317565)
      PathPoint P2: torso (0.08190083 0.2070028 0.03204047)
    Thelen2003Muscle rect_abd_l: max_isometric_force=263 optimal_fiber_length=0.2358064 tendon_slack_length=0.01791201
      PathPoint P1: pelvis (-0.05125105 -0.09860166 -0.01317565)
      PathPoint P2: torso (0.08190083 0.2070028 -0.03204047)
    Schutte1993Muscle_Deprecated r_stern_mast: max_isometric_force=68.95 optimal_fiber_length=0.1051623
        tendon_slack_length=0.05464835 pennation_angle_at_optimal=0.2617994
      PathPoint stern_mast-P1: torso (0.02790171 0.359002 0.008928548)
      PathPoint stern_mast-P2: head_and_neck (0 0.085 0.0643)
    Schutte1993Muscle_Deprecated l_stern_mast: max_isometric_force=68.95 optimal_fiber_length=0.1051623
        tendon_slack_length=0.05464835 pennation_angle_at_optimal=0.2617994
      PathPoint stern_mast-P1: torso (0.02790171 0.359002 -0.008928548)
      PathPoint stern_mast-P2: head_and_neck (0 0.085 -0.0643)
    Schutte1993Muscle_Deprecated r_trap_acr: max_isometric_force=376.95 optimal_fiber_length=0.08556525
        tendon_slack_length=0.07122563 pennation_angle_at_optimal=0
      PathPoint trap_acr-P1: torso (-0.06045371 0.390624 0)
      PathPoint trap_acr-P2: torso (0 0.3813234 -0.09300571)
    Schutte1993Muscle_Deprecated l_trap_acr: max_isometric_force=376.95 optimal_fiber_length=0.08556525
        tendon_slack_length=0.07122563 pennation_angle_at_optimal=0
      PathPoint trap_acr-P1: torso (-0.06045371 0.390624 0)
      PathPoint trap_acr-P2: torso (0 0.3813234 0.09300571)
    Schutte1993Muscle_Deprecated TRIlong: max_isometric_force=798.52 optimal_fiber_length=0.1036718
        tendon_slack_length=0.1106348 pennation_angle_at_optimal=0.2094395
      PathPoint P1: torso (-0.01860114 0.3534217 0.1395086)
      PathPoint P2: humerus_r (-0.02070548 -0.08728495 -0.005065747)
      PathPoint P3: humerus_r (-0.02429117 -0.1727008 -0.009284659)
      PathPoint P4: humerus_r (-0.01329758 -0.2041328 -0.009215997)
      PathPoint P5: ulna_r (-0.01542368 0.007366744 -0.0005493365)
    Schutte1993Muscle_Deprecated TRIlong_l: max_isometric_force=798.52 optimal_fiber_length=0.1036718
        tendon_slack_length=0.1106348 pennation_angle_at_optimal=0.2094395
      PathPoint TRIlong-P1: torso (-0.01860114 0.3534217 -0.1395086)
      PathPoint TRIlong-P2: humerus_l (-0.02070548 -0.08728495 0.005065747)
      PathPoint TRIlong-P3: humerus_l (-0.02429117 -0.1727008 0.009284659)
      PathPoint TRIlong-P4: humerus_l (-0.01329758 -0.2041328 0.009215997)
      PathPoint TRIlong-P5: ulna_l (-0.01542368 0.007366744 0.0005493365)
    Schutte1993Muscle_Deprecated TRIlat: max_isometric_force=624.3 optimal_fiber_length=0.08774845
        tendon_slack_length=0.07556545 pennation_angle_at_optimal=0.1570796
      PathPoint P1: humerus_r (-0.004569853 -0.09647806 0.00326527)
      PathPoint P2: humerus_r (-0.0178827 -0.1108361 0.007079839)
      PathPoint P3: humerus_r (-0.02429117 -0.1727008 -0.009284659)
      PathPoint P4: humerus_r (-0.01329758 -0.2041328 -0.009215997)
      PathPoint P5: ulna_r (-0.01542368 0.007366744 -0.0005493365)
    Schutte1993Muscle_Deprecated TRIlat_l: max_isometric_force=624.3 optimal_fiber_length=0.08774845
        tendon_slack_length=0.07556545 pennation_angle_at_optimal=0.1570796
      PathPoint P1: humerus_l (-0.004569853 -0.09647806 -0.00326527)
      PathPoint P2: humerus_l (-0.0178827 -0.1108361 -0.007079839)
      PathPoint P3: humerus_l (-0.02429117 -0.1727008 0.009284659)
      PathPoint P4: humerus_l (-0.01329758 -0.2041328 0.009215997)
      PathPoint P5: ulna_l (-0.01542368 0.007366744 0.0005493365)
    Schutte1993Muscle_Deprecated BIClong: max_isometric_force=624.3 optimal_fiber_length=0.08904605
        tendon_slack_length=0.2095699 pennation_angle_at_optimal=0
      PathPoint P1: torso (0.02790171 0.3441211 0.1395086)
      PathPoint P2: torso (0.02790171 0.358072 0.1488091)
      PathPoint P3: humerus_r (0.01625769 0.01373245 0.007629136)
      PathPoint P4: humerus_r (0.01814209 -0.003898489 0.009162593)
      PathPoint P5: humerus_r (0.01220662 -0.02136158 0.001037563)
      PathPoint P6: humerus_r (0.009917877 -0.05874435 -0.001258808)
      PathPoint P7: humerus_r (0.01299242 -0.09250328 0.0001830993)
      PathPoint P8: humerus_r (0.01739443 -0.1338151 -0.004806356)
      PathPoint BIClong_l-P9: humerus_r (0.02670198 -0.2136158 -0.004577482)
      PathPoint P10: radius_r (-0.001408555 -0.02641041 -0.001408555)
    Schutte1993Muscle_Deprecated BIClong_l: max_isometric_force=624.3 optimal_fiber_length=0.08904605
        tendon_slack_length=0.2095699 pennation_angle_at_optimal=0
      PathPoint P1: torso (0.02790171 0.3441211 -0.1395086)
      PathPoint P2: torso (0.02790171 0.358072 -0.1488091)
      PathPoint P3: humerus_l (0.01625769 0.01373245 -0.007629136)
      PathPoint P4: humerus_l (0.01814209 -0.003898489 -0.009162593)
      PathPoint P5: humerus_l (0.01220662 -0.02136158 -0.001037563)
      PathPoint P6: humerus_l (0.009917877 -0.05874435 0.001258808)
      PathPoint P7: humerus_l (0.01299242 -0.09250328 -0.0001830993)
      PathPoint P8: humerus_l (0.01739443 -0.1338151 0.004806356)
      PathPoint P9: humerus_l (0.02670198 -0.2136158 0.004577482)
      PathPoint P10: radius_l (-0.001408555 -0.02641041 0.001408555)
    Schutte1993Muscle_Deprecated BRD: max_isometric_force=261.33 optimal_fiber_length=0.1237687
        tendon_slack_length=0.09537217 pennation_angle_at_optimal=0
      PathPoint P1: humerus_r (0.007629136 -0.1525827 0.001701297)
      PathPoint P2: radius_r (0 0.01408555 0.01619838)
      PathPoint P3: radius_r (0 -0.1619838 0.0281711)
    Schutte1993Muscle_Deprecated BRD_l: max_isometric_force=261.33 optimal_fiber_length=0.1237687
        tendon_slack_length=0.09537217 pennation_angle_at_optimal=0
      PathPoint P1: humerus_l (0.007629136 -0.1525827 -0.001701297)
      PathPoint P2: radius_l (0 0.01408555 -0.01619838)
      PathPoint P3: radius_l (0 -0.1619838 -0.0281711)
    Schutte1993Muscle_Deprecated FCR: max_isometric_force=73.96 optimal_fiber_length=0.04442227
        tendon_slack_length=0.1725961 pennation_angle_at_optimal=0.05410521
      PathPoint P1: humerus_r (0.005782885 -0.2121358 -0.02826595)
      PathPoint P2: radius_r (0.00281711 -0.1690266 0.01408555)
      PathPoint P3: hand_r (0.002112833 -0.01408555 0.01408555)
    Schutte1993Muscle_Deprecated FCR_l: max_isometric_force=73.96 optimal_fiber_length=0.04442243
        tendon_slack_length=0.1725967 pennation_angle_at_optimal=0.05410521
      PathPoint P1: humerus_l (0.005782885 -0.2121358 0.02826595)
      PathPoint P2: radius_l (0.00281711 -0.1690266 -0.01408555)
      PathPoint P3: hand_l (0.002112833 -0.01408555 -0.01408555)
    Schutte1993Muscle_Deprecated ECRL: max_isometric_force=304.89 optimal_fiber_length=0.05735153
        tendon_slack_length=0.1586018 pennation_angle_at_optimal=0
      PathPoint P1: humerus_r (-0.00556927 -0.1990442 0.01525827)
      PathPoint P2: radius_r (-0.02112833 -0.09481689 0.01971977)
      PathPoint P3: radius_r (-0.01408555 -0.1669138 0.02535399)
      PathPoint P4: hand_r (-0.002112833 -0.01408555 0.01408555)
    Schutte1993Muscle_Deprecated ECRL_l: max_isometric_force=304.89 optimal_fiber_length=0.05735363
        tendon_slack_length=0.1586076 pennation_angle_at_optimal=0
      PathPoint P1: humerus_l (-0.00556927 -0.1990442 -0.01525827)
      PathPoint P2: radius_l (-0.02112833 -0.09481689 -0.01971977)
      PathPoint P3: radius_l (-0.01408555 -0.1669138 -0.02535399)
      PathPoint P4: hand_l (-0.002112833 -0.01408555 -0.01408555)
    Schutte1993Muscle_Deprecated PT: max_isometric_force=566.22 optimal_fiber_length=0.06958766
        tendon_slack_length=0.1590575 pennation_angle_at_optimal=0.1745329
      PathPoint P1: humerus_r (0.002746489 -0.2104879 -0.02784635)
      PathPoint P2: ulna_r (0 -0.02464972 -0.009859886)
      PathPoint P3: radius_r (0.007042776 -0.06338498 0.01760694)
      PathPoint P4: radius_r (-0.01760694 -0.09155609 0.02112833)
    Schutte1993Muscle_Deprecated PT_l: max_isometric_force=566.22 optimal_fiber_length=0.06957725
        tendon_slack_length=0.1590337 pennation_angle_at_optimal=0.1745329
      PathPoint P1: humerus_l (0.002746489 -0.2104879 0.02746489)
      PathPoint P2: ulna_l (0 -0.02464972 0.009859886)
      PathPoint P3: radius_l (0.007042776 -0.06338498 -0.01760694)
      PathPoint P4: radius_l (-0.01760694 -0.09155609 -0.02112833)
    Schutte1993Muscle_Deprecated LAT2: max_isometric_force=389.1 optimal_fiber_length=0.218985
        tendon_slack_length=0.1663118 pennation_angle_at_optimal=0.3316126
      PathPoint P1: humerus_r (-0.003814568 -0.03105821 -0.004577482)
      PathPoint P2: torso (-0.1116069 0.260416 0.1209074)
      PathPoint P3: torso (-0.1023063 0.2232137 0.04650286)
      PathPoint P4: torso (-0.0668339 0.1674103 0.007440457)
    Schutte1993Muscle_Deprecated LAT2_l: max_isometric_force=389.1 optimal_fiber_length=0.218985
        tendon_slack_length=0.1663118 pennation_angle_at_optimal=0.3316126
      PathPoint P1: humerus_l (-0.003814568 -0.03105821 0.004577482)
      PathPoint P2: torso (-0.1116069 0.260416 -0.1209074)
      PathPoint P3: torso (-0.1023063 0.2232137 -0.04650286)
      PathPoint P4: torso (-0.0668339 0.1674103 -0.007440457)
    Schutte1993Muscle_Deprecated PECM2: max_isometric_force=515.41 optimal_fiber_length=0.1310863
        tendon_slack_length=0.08423597 pennation_angle_at_optimal=0.4363323
      PathPoint P1: humerus_r (0.00971952 -0.03280529 -0.006103309)
      PathPoint P2: torso (0.07905485 0.2976183 0.09300571)
      PathPoint P3: torso (0.07905485 0.2976183 0.04650286)
      PathPoint P4: torso (0.02575328 0.2976183 0.02139131)
    Schutte1993Muscle_Deprecated PECM2_l: max_isometric_force=515.41 optimal_fiber_length=0.1310863
        tendon_slack_length=0.08423597 pennation_angle_at_optimal=0.4363323
      PathPoint PECM2-P1_l: humerus_l (0.00971952 -0.03280529 0.006103309)
      PathPoint PECM2-P2_l: torso (0.07905485 0.2976183 -0.09300571)
      PathPoint PECM2-P3_l: torso (0.07905485 0.2976183 -0.04650286)
      PathPoint PECM2-P4_l: torso (0.02575328 0.2976183 -0.02139131)
    ObjectGroup R_hip_abd: members=(glut_med1_r sar_r tfl_r)
    ObjectGroup R_hip_flex: members=(glut_med1_r sar_r tfl_r)
    ObjectGroup R_hip_inrot: members=(glut_med1_r tfl_r)
    ObjectGroup R_hip_exrot
    ObjectGroup R_hip_ext: members=(bifemlh_r semiten_r)
    ObjectGroup R_hip_add: members=(bifemlh_r semiten_r)
    ObjectGroup R_knee_bend: members=(bifemlh_r lat_gas_r med_gas_r sar_r semiten_r)
    ObjectGroup R_knee_ext: members=(vas_lat_r vas_med_r)
    ObjectGroup R_ankle_pf: members=(lat_gas_r med_gas_r soleus_r tib_post_r)
    ObjectGroup R_inverter: members=(tib_ant_r tib_post_r)
    ObjectGroup R_ankle_df: members=tib_ant_r
    ObjectGroup R_everter
    ObjectGroup L_hip_abd: members=(glut_med1_l sar_l tfl_l)
    ObjectGroup L_hip_flex: members=(glut_med1_l sar_l tfl_l)
    ObjectGroup L_hip_inrot: members=(glut_med1_l tfl_l)
    ObjectGroup L_hip_exrot
    ObjectGroup L_hip_ext: members=(bifemlh_l semiten_l)
    ObjectGroup L_hip_add: members=(bifemlh_l semiten_l)
    ObjectGroup L_knee_bend: members=(bifemlh_l lat_gas_l med_gas_l sar_l semiten_l)
    ObjectGroup L_knee_ext: members=(vas_lat_l vas_med_l)
    ObjectGroup L_ankle_pf: members=(lat_gas_l med_gas_l soleus_l tib_post_l)
    ObjectGroup L_inverter: members=(tib_ant_l tib_post_l)
    ObjectGroup L_ankle_df: members=tib_ant_l
    ObjectGroup L_everter
    ObjectGroup back_ext: members=(ercspn_l ercspn_r)
    ObjectGroup back_rlb: members=ercspn_r
    ObjectGroup back_introt: members=ercspn_r
    ObjectGroup back_llb: members=ercspn_l
    ObjectGroup back_extrot: members=ercspn_l
    ObjectGroup back_flex: members=(rect_abd_r rect_abd_l)
    ObjectGroup neck flexion: members=(r_stern_mast l_stern_mast r_trap_acr l_trap_acr)
    ObjectGroup R_shoulder: members=(ant_delt_r post_delt_r medial_delt_r PECM2 LAT2)
    ObjectGroup L_shoulder: members=(ant_delt_l post_delt_l medial_delt_l PECM2_l LAT2_l)
    ObjectGroup R_elbow: members=(TRIlong TRIlat BIClong BRD)
    ObjectGroup L_elbow: members=(TRIlong_l TRIlat_l BIClong_l BRD_l)
    ObjectGroup R_wrist: members=(FCR ECRL PT)
    ObjectGroup L_wrist: members=(FCR_l ECRL_l PT_l)
  MarkerSet:
    Marker Nose: head_and_neck (0.1152947 0.07905947 0.000152885) fixed=true
    Marker Neck: torso (0.04229661 0.3406864 -0.0004733991) fixed=true
    Marker LShoulder: torso (0.03683626 0.3406865 -0.1448034) fixed=true
    Marker RShoulder: torso (0.02170066 0.3406865 0.1501217) fixed=true
    Marker LElbow: humerus_l (0.01907284 -0.2273136 0.006666075) fixed=true
    Marker RElbow: humerus_r (0.01907284 -0.2273136 -0.006666075) fixed=true
    Marker LWrist: radius_l (-0.0001222549 -0.1655728 -0.006862336) fixed=true
    Marker RWrist: radius_r (-0.0001222549 -0.1655728 0.006862336) fixed=true
    Marker LHip: pelvis (-0.0787919 -0.1002571 -0.1299156) fixed=true
    Marker RHip: pelvis (-0.0787919 -0.1002571 0.1299156) fixed=true
    Marker LKnee: femur_l (0.03956152 -0.4123986 -0.005132852) fixed=true
    Marker RKnee: femur_r (0.04441514 -0.4068187 0.005132852) fixed=true
    Marker LAnkle: tibia_l (0.0226395 -0.3998559 -0.01442393) fixed=true
    Marker RAnkle: tibia_r (0.02202415 -0.3963344 0.01442393) fixed=true
    Marker LBigToe: toes_l (0.04465978 0.006816162 0.01006971) fixed=true
    Marker LSmallToe: toes_l (0.01872785 0.006610564 -0.01987674) fixed=true
    Marker LHeel: calcn_l (0.009383061 0.01609493 0.001303043) fixed=true
    Marker RBigToe: toes_r (0.04465978 0.006816162 -0.01006971) fixed=true
    Marker RSmallToe: toes_r (0.01872785 0.006610564 0.01987674) fixed=true
    Marker RHeel: calcn_r (0.009383061 0.01609493 -0.001303043) fixed=true
    Marker CHip: pelvis (-0.01073313 -0.07932225 -0.006650065) fixed=true
