# OpenSim document version 40000
Model WUShoulderModel_S2M_box_lifting_py2:
  gravity: 0 0 -9.8
  defaults: Thelen2003Muscle default: max_isometric_force=546 optimal_fiber_length=0.0535 tendon_slack_length=0.078
      pennation_angle_at_optimal=0.1396263 [radians] max_contraction_velocity=10 default_activation=1
  Ground
  BodySet:
    Body thorax: mass=20 [kg] mass_center=(-0.0591 -0.01486 0) inertia=(1.29841 0.35245 1.29841 0 0 0)
        meshes=(thorax.vtp hat_spine.vtp)
      WrapCylinder SpineCyl_left: active=false xyz_body_rotation=(-1.57 0 0)
          translation=(-0.0467625 0.0898259 -0.0181467) quadrant=-x radius=0.01495603 length=0.0797655
      WrapCylinder SpineCyl2_left: active=false xyz_body_rotation=(-1.57 1.2 0)
          translation=(-0.0467625 0.0300018 -0.0239297) quadrant=-x radius=0.01994138 length=0.1495603
      WrapCylinder SpineCyl2_RMN_left: active=false xyz_body_rotation=(-1.57 1.2 0)
          translation=(-0.0467625 0.0300018 -0.0239297) quadrant=-x radius=0.01994138 length=0.1495603
      WrapCylinder SpineCyl3_left: active=false xyz_body_rotation=(-1.57 0.21 0)
          translation=(-0.0856482 -0.0748699 -0.0239297) quadrant=-x radius=0.01994138 length=0.1894431
      WrapCylinder SpineCyl3_RMJ1_left: active=false xyz_body_rotation=(-1.57 0.21 0)
          translation=(-0.0856482 -0.0748699 -0.0239297) quadrant=-x radius=0.01994138 length=0.1894431
      WrapCylinder SpineCyl3_RMJ2_left: active=false xyz_body_rotation=(-1.57 0.21 -0.4)
          translation=(-0.0756482 -0.0748699 -0.0239297) quadrant=-x radius=0.02594138 length=0.1894431
      WrapCylinder SpineCyl3_RMJ2_1_left: active=false xyz_body_rotation=(-1.57 0.21 0.4)
          translation=(-0.07726668 -0.0748699 -0.0239297) quadrant=-x radius=0.01994138 length=0.1894431
      WrapEllipsoid ThoraxSRA_left: active=false xyz_body_rotation=(0 0.331962 0.139892)
          translation=(-0.0384869 -0.0930265 -0.0648095) quadrant=all dimensions=(0.0498534 0.0997069 0.0648095)
      WrapEllipsoid ThoraxSRA_SRA2_left: active=false xyz_body_rotation=(0 0.331962 0.139892)
          translation=(-0.0384869 -0.0930265 -0.0648095) quadrant=+z dimensions=(0.0498534 0.0997069 0.0648095)
      WrapCylinder SRACyl_left: active=false xyz_body_rotation=(1.57 0.331962 0.6)
          translation=(-0.02715599 -0.06867068 -0.07438272) quadrant=-x radius=0.0492 length=0.08
      WrapEllipsoid ThoraxSRA2_left: active=false xyz_body_rotation=(0 0.431962 0.139892)
          translation=(-0.008761958 -0.116956 -0.07033409) quadrant=z dimensions=(0.0666674 0.109678 0.0648095)
      WrapCylinder SRACyl_SRA2_left: active=false xyz_body_rotation=(1.4 -0.431962 1)
          translation=(-0.03848692 -0.08874594 -0.0820418) quadrant=-x radius=0.04500199 length=0.07955042
      WrapCylinder SRACyl_SRA2_2_left: active=false xyz_body_rotation=(1.57 0.531962 1.6)
          translation=(-0.014002 -0.092702 -0.0820418) quadrant=-x radius=0.04945531 length=0.07955042
      WrapEllipsoid ThoraxLAT_left: active=false xyz_body_rotation=(0 0.431962 0.139892)
          translation=(-0.0335015 -0.142581 -0.0648095) quadrant=all dimensions=(0.0747802 0.109678 0.0648095)
    Body clavicle_left: mass=0.2 mass_center=(-0.0122396 0.00817425 0.0634902) inertia=(0 0 0 0 0 0)
        meshes=clavicle_left.vtp
    Body scapula_left: mass=0.5 mass_center=(-0.0826627 -0.0447756 -0.0746261) inertia=(0 0 0 0 0 0)
        meshes=scapula_left.vtp
      WrapCylinder INFSPCyl_left: active=false xyz_body_rotation=(-0.55 -2.3 0.95)
          translation=(-0.064408 -0.049 0.0128586) quadrant=-x radius=0.009 length=0.08
    Body humerus_left: mass=2.0325 mass_center=(0 -0.16402 0) inertia=(0.0118761 0.00409688 0.0133305 0 0 0)
        meshes=humerus_left.vtp
      WrapTorus WP_humerus_torus_BICl_left: active=false xyz_body_rotation=(-0.2 -0.4 0) translation=(0 0.01 0)
          quadrant=+z inner_radius=0.023 outer_radius=0.03
      WrapTorus WP_humerus_torus_middle_left: active=false xyz_body_rotation=(-1.57 0 0) translation=(0 -0.1 0)
          quadrant=all inner_radius=0.025 outer_radius=0.05
      WrapTorus WP_humerus_torus_middle_b_left: active=false xyz_body_rotation=(-1.57 0 0) translation=(0 -0.1 0)
          quadrant=+z inner_radius=0.018 outer_radius=0.051
      WrapEllipsoid SUPSP_left: active=false xyz_body_rotation=(-0.0380482 -0.00855211 -1.30673)
          translation=(0.000199414 0.00767743 -0.0042874) quadrant=all dimensions=(0.0199414 0.0199414 0.0199414)
      WrapCylinder INFSP_and_TMIN_hum_left: active=false xyz_body_rotation=(-1.5 0.5 -0.1)
          translation=(0.001299121 0.00159238 -0.00378886) quadrant=-x radius=0.023 length=0.04
      WrapSphere TMAJ_LAT_PEC_CORBhh_left: active=false translation=(0.000299121 -0.00897362 -0.00598241) quadrant=all
          radius=0.02442818
      WrapCylinder CORBhum_left: active=false xyz_body_rotation=(1.60832 -0.0959931 0.875283)
          translation=(0.00269209 -0.119848 0.00588271) quadrant=x radius=0.00797655 length=0.04985344
      WrapEllipsoid TRIlonghh_left: active=false xyz_body_rotation=(-3.00162 0.853466 2.57419)
          translation=(-0.00777714 -0.00408798 0.0013959) quadrant=z dimensions=(0.0448974 0.0199414 0.0199414)
      WrapEllipsoid Elbow_BIC_BRD_left: active=false xyz_body_rotation=(0.128631 -0.137532 0.0307178)
          translation=(0.00189443 -0.288153 0.013959) quadrant=x dimensions=(0.014956 0.014956 0.0997069)
      WrapEllipsoid Elbow_BIC_BRD_b_left: active=false xyz_body_rotation=(0.128631 -0.137532 0.0307178)
          translation=(0.00189443 -0.288153 0.013959) quadrant=x dimensions=(0.014956 0.014956 0.0997069)
    Body ulna_left: mass=0.6075 mass_center=(0 -0.123087 0) inertia=(0.00308928 0.000644555 0.00335106 0 0 0)
        meshes=ulna_left.vtp
      WrapCylinder WP_ulna_TRI_left: active=false xyz_body_rotation=(0.015 0.025 0.3) translation=(0 0 0) quadrant=y
          radius=0.025 length=0.04
    Body radius_left: mass=0.6075 mass_center=(0 -0.123087 0) inertia=(0.00308928 0.000644555 0.00335106 0 0 0)
        meshes=radius_left.vtp
    Body hand_left: mass=0.4575 mass_center=(0 -0.068095 0) inertia=(0.000892 0.000547 0.00134 0 0 0)
      PhysicalOffsetFrame hand_left_geom_frame_1: socket_parent=.. translation=(-0.013388 -0.009886 -0.010593) [meters]
      PhysicalOffsetFrame hand_left_geom_frame_3: socket_parent=.. translation=(0.012345 -0.004464 -0.001254)
      PhysicalOffsetFrame hand_left_geom_frame_4: socket_parent=.. translation=(-0.010784 -0.007499 -0.001289)
      PhysicalOffsetFrame hand_left_geom_frame_5: socket_parent=.. translation=(-0.006977 -0.017549 0.001577)
      PhysicalOffsetFrame hand_left_geom_frame_6: socket_parent=.. translation=(0.003992 -0.015054 0.002327)
      PhysicalOffsetFrame hand_left_geom_frame_7: socket_parent=.. translation=(0.013135 -0.019116 -0.000137)
      PhysicalOffsetFrame hand_left_geom_frame_8: socket_parent=.. translation=(0.019285 -0.019623 -0.007981)
      PhysicalOffsetFrame hand_left_geom_frame_9: socket_parent=.. translation=(0.026485 -0.025023 -0.010481)
      PhysicalOffsetFrame hand_left_geom_frame_10: socket_parent=.. translation=(0.018677 -0.052674 0.007359)
      PhysicalOffsetFrame hand_left_geom_frame_11: socket_parent=.. translation=(0.004469 -0.054293 0.009704)
      PhysicalOffsetFrame hand_left_geom_frame_12: socket_parent=.. translation=(-0.008054 -0.055573 0.00584)
      PhysicalOffsetFrame hand_left_geom_frame_13: socket_parent=.. translation=(-0.017904 -0.049737 -0.001891)
      PhysicalOffsetFrame hand_left_geom_frame_14: socket_parent=.. translation=(0.042985 -0.054223 -0.023181)
      PhysicalOffsetFrame hand_left_geom_frame_15: socket_parent=.. translation=(0.056985 -0.080123 -0.033281)
      PhysicalOffsetFrame hand_left_geom_frame_16: socket_parent=.. translation=(0.022178 -0.080917 0.010979)
      PhysicalOffsetFrame hand_left_geom_frame_17: socket_parent=.. translation=(0.029695 -0.12219 0.018305)
      PhysicalOffsetFrame hand_left_geom_frame_18: socket_parent=.. translation=(0.033028 -0.147078 0.019525)
      PhysicalOffsetFrame hand_left_geom_frame_19: socket_parent=.. translation=(0.004709 -0.080583 0.011482)
      PhysicalOffsetFrame hand_left_geom_frame_20: socket_parent=.. translation=(0.006359 -0.124794 0.017712)
      PhysicalOffsetFrame hand_left_geom_frame_21: socket_parent=.. translation=(0.007724 -0.153841 0.019666)
      PhysicalOffsetFrame hand_left_geom_frame_22: socket_parent=.. translation=(-0.009884 -0.079262 0.005667)
      PhysicalOffsetFrame hand_left_geom_frame_23: socket_parent=.. translation=(-0.013412 -0.119517 0.007012)
      PhysicalOffsetFrame hand_left_geom_frame_24: socket_parent=.. translation=(-0.015729 -0.144306 0.007575)
      PhysicalOffsetFrame hand_left_geom_frame_25: socket_parent=.. translation=(-0.019501 -0.071168 -0.003387)
      PhysicalOffsetFrame hand_left_geom_frame_26: socket_parent=.. translation=(-0.02478 -0.106731 -0.006266)
      PhysicalOffsetFrame hand_left_geom_frame_27: socket_parent=.. translation=(-0.027651 -0.127408 -0.008509)
  JointSet:
    CustomJoint ground_thorax: socket_parent_frame=ground_offset socket_child_frame=thorax_offset
      Coordinate thorax_tilt: default_value=0 range=(-1.5708 1.5708) clamped=false
      Coordinate thorax_list: default_value=0 range=(-1.5708 1.5708) clamped=false
      Coordinate thorax_rotation: default_value=0 range=(-1.5708 1.5708) clamped=false
      Coordinate thorax_tx: default_value=0 range=(-20 20) clamped=false
      Coordinate thorax_ty: default_value=0 range=(-2 4) clamped=false
      Coordinate thorax_tz: default_value=0 range=(-5 5) clamped=false
      PhysicalOffsetFrame ground_offset: socket_parent=/ground translation=(0 0 0)
      PhysicalOffsetFrame thorax_offset: socket_parent=/bodyset/thorax translation=(0 0 0)
      SpatialTransform:
        TransformAxis rotation1: coordinates=thorax_tilt axis=(0 0 1) LinearFunction(coefficients=1 0)
        TransformAxis rotation2: coordinates=thorax_list axis=(1 0 0) LinearFunction(coefficients=1 0)
        TransformAxis rotation3: coordinates=thorax_rotation axis=(0 1 0) LinearFunction(coefficients=1 0)
        TransformAxis translation1: coordinates=thorax_tx axis=(1 0 0)
            MultiplierFunction(scale=1, LinearFunction(coefficients=1 0))
        TransformAxis translation2: coordinates=thorax_ty axis=(0 1 0)
            MultiplierFunction(scale=1, LinearFunction(coefficients=1 0))
        TransformAxis translation3: coordinates=thorax_tz axis=(0 0 1)
            MultiplierFunction(scale=1, LinearFunction(coefficients=1 0))
    CustomJoint SCJ_left: socket_parent_frame=thorax_offset socket_child_frame=clavicle_left_offset
      Coordinate sternoclavicular_left_r1: default_value=0 range=(-3 3) clamped=true
      Coordinate sternoclavicular_left_r2: default_value=0 range=(-3 3) clamped=true
      Coordinate sternoclavicular_left_r3: default_value=0 range=(-3 3) clamped=true locked=true
      PhysicalOffsetFrame thorax_offset: socket_parent=/bodyset/thorax translation=(0.00630646 0.00690969 -0.0253904)
      PhysicalOffsetFrame clavicle_left_offset: socket_parent=/bodyset/clavicle_left translation=(0 0 0)
      SpatialTransform: axes_held_at_zero=(translation1 translation2 translation3)
        TransformAxis rotation1: coordinates=sternoclavicular_left_r1 axis=(-0.0153 -0.9892987 -0.1451)
            LinearFunction(coefficients=1 0)
        TransformAxis rotation2: coordinates=sternoclavicular_left_r2 axis=(0.9944725 0 -0.104997)
            LinearFunction(coefficients=1 0)
        TransformAxis rotation3: coordinates=sternoclavicular_left_r3 axis=(0.103812 -0.145416 0.9839092)
            LinearFunction(coefficients=1 0)
    CustomJoint ACJ_left: socket_parent_frame=clavicle_left_offset socket_child_frame=scapula_left_offset
      Coordinate Acromioclavicular_left_r1: default_value=0 range=(-3 3) clamped=true
      Coordinate Acromioclavicular_left_r2: default_value=0 range=(-3 3) clamped=true
      Coordinate Acromioclavicular_left_r3: default_value=0 range=(-3 3) clamped=true
      PhysicalOffsetFrame clavicle_left_offset: socket_parent=/bodyset/clavicle_left
          translation=(-0.0137883 0.0193113 -0.130411) orientation=(0.52 -0.52 0) [radians]
      PhysicalOffsetFrame scapula_left_offset: socket_parent=/bodyset/scapula_left translation=(0 0 0)
          orientation=(0.52 -0.52 0)
      SpatialTransform: axes_held_at_zero=(translation1 translation2 translation3)
        TransformAxis rotation1: coordinates=Acromioclavicular_left_r1 axis=(0 0 1) LinearFunction(coefficients=1 0)
        TransformAxis rotation2: coordinates=Acromioclavicular_left_r2 axis=(0 -1 0) LinearFunction(coefficients=1 0)
        TransformAxis rotation3: coordinates=Acromioclavicular_left_r3 axis=(1 0 0) LinearFunction(coefficients=1 0)
    CustomJoint GHJ_left: socket_parent_frame=scapula_left_offset socket_child_frame=humerus_left_offset
      Coordinate shoulder_left_plane: default_value=-1.570796 default_speed_value=5.342924e-15 range=(-3 3)
          clamped=false
      Coordinate shoulder_left_ele: default_value=0 range=(-3 3) clamped=false
      Coordinate shoulder_left_rotation: default_value=1.57 default_speed_value=1.000209e-14 range=(-3 3) clamped=false
      PhysicalOffsetFrame scapula_left_offset: socket_parent=/bodyset/scapula_left translation=(-0.00955 -0.034 -0.009)
      PhysicalOffsetFrame humerus_left_offset: socket_parent=/bodyset/humerus_left translation=(0 0 0)
      SpatialTransform: axes_held_at_zero=(translation1 translation2 translation3)
        TransformAxis rotation1: coordinates=shoulder_left_plane axis=(-0.0001 -1 0.0001)
            LinearFunction(coefficients=1 0)
        TransformAxis rotation2: coordinates=shoulder_left_ele axis=(0 0 1) LinearFunction(coefficients=1 0)
        TransformAxis rotation3: coordinates=shoulder_left_rotation axis=(0 -1 0) LinearFunction(coefficients=1 0)
    CustomJoint elbow_left: socket_parent_frame=humerus_left_offset socket_child_frame=ulna_left_offset
      Coordinate elbow_left_flexion: default_value=0 range=(-3 3) clamped=true
      PhysicalOffsetFrame humerus_left_offset: socket_parent=/bodyset/humerus_left
          translation=(0.00608212 -0.289549 0.0122639)
      PhysicalOffsetFrame ulna_left_offset: socket_parent=/bodyset/ulna_left translation=(0 0 0)
      SpatialTransform: axes_held_at_zero=(rotation1 rotation2 translation1 translation2 translation3)
        TransformAxis rotation3: coordinates=elbow_left_flexion axis=(-0.04940001 -0.03660001 0.9981082)
            LinearFunction(coefficients=1 0)
    CustomJoint radioulnar_left: socket_parent_frame=ulna_left_offset socket_child_frame=radius_left_offset
      Coordinate pro_sup_left: default_value=0 range=(-3 3) clamped=true
      PhysicalOffsetFrame ulna_left_offset: socket_parent=/bodyset/ulna_left
          translation=(0.000408504 -0.0117475 -0.0204242)
      PhysicalOffsetFrame radius_left_offset: socket_parent=/bodyset/radius_left translation=(0 0 0)
      SpatialTransform: axes_held_at_zero=(rotation1 rotation3 translation1 translation2 translation3)
        TransformAxis rotation2: coordinates=pro_sup_left axis=(0.01716099 -0.9926656 -0.119668)
            LinearFunction(coefficients=1 0)
    CustomJoint radius_hand_left: socket_parent_frame=radius_left_offset socket_child_frame=hand_left_offset
      Coordinate hand_left_Add: default_value=0 range=(-1.2 1.2) clamped=true locked=true
      Coordinate hand_left_Flex: default_value=0 range=(-1 1.39626) clamped=true locked=true
      PhysicalOffsetFrame radius_left_offset: socket_parent=/bodyset/radius_left
          translation=(0.0174787 -0.234992 -0.024276)
      PhysicalOffsetFrame hand_left_offset: socket_parent=/bodyset/hand_left translation=(0 0 0)
      SpatialTransform: axes_held_at_zero=(rotation2 translation1 translation2 translation3)
        TransformAxis rotation1: coordinates=hand_left_Add axis=(0 0 1) LinearFunction(coefficients=1 0)
        TransformAxis rotation3: coordinates=hand_left_Flex axis=(-1 0 0) LinearFunction(coefficients=1 0)
  ForceSet:
    Thelen2003Muscle LVS_left: max_isometric_force=169.9564 optimal_fiber_length=0.1437317
        tendon_slack_length=0.005082005 pennation_angle_at_optimal=0
      PathPoint P1: thorax (-0.0371538 0.094161 -0.0224777)
      PathPoint P2: scapula_left (-0.0776652 0.000771905 0.109819)
    Thelen2003Muscle TRP1_left: max_isometric_force=280.5671 optimal_fiber_length=0.1013721
        tendon_slack_length=0.01518407 pennation_angle_at_optimal=0
      PathPoint P1: thorax (-0.0587873 0.0965659 -0.00191913)
      PathPoint P2: clavicle_left (-0.0294411 0.0239066 -0.0945424)
      PathWrap: wrap_object=SpineCyl_left
    Thelen2003Muscle TRP2_left: max_isometric_force=162.45 optimal_fiber_length=0.08371994
        tendon_slack_length=0.04201256 pennation_angle_at_optimal=0
      PathPoint P1: thorax (-0.077245 0.0313656 -0.00355867)
      PathPoint P2: scapula_left (-0.0447756 -0.00296403 0.0114809)
      PathWrap: wrap_object=SpineCyl2_left
    Thelen2003Muscle TRP3_left: max_isometric_force=155.2832 optimal_fiber_length=0.07246607
        tendon_slack_length=0.01762886 pennation_angle_at_optimal=0
      PathPoint P1: thorax (-0.0918954 -0.0153597 -0.00249867)
      PathPoint P2: scapula_left (-0.0669844 -0.00747356 0.0509934)
    Thelen2003Muscle TRP4_left: max_isometric_force=557.2435 optimal_fiber_length=0.1167916
        tendon_slack_length=0.004554604 pennation_angle_at_optimal=0
      PathPoint P1: thorax (-0.115641 -0.105255 -0.000681621)
      PathPoint P2: scapula_left (-0.0909197 -0.0148608 0.0905847)
      PathWrap: wrap_object=SpineCyl3_left method=hybrid
    Thelen2003Muscle RMN_left: max_isometric_force=301.6171 optimal_fiber_length=0.1427899
        tendon_slack_length=0.02476045 pennation_angle_at_optimal=0
      PathPoint P1: thorax (-0.0628153 0.0557977 -0.00299121)
      PathPoint P2: scapula_left (-0.0907648 -0.0151011 0.115107)
      PathWrap: wrap_object=SpineCyl2_RMN_left
    Thelen2003Muscle RMJ1_left: max_isometric_force=185.9359 optimal_fiber_length=0.1492575
        tendon_slack_length=0.01686566 pennation_angle_at_optimal=0
      PathPoint P1: thorax (-0.0788272 0.00941237 -0.00142958)
      PathPoint P2: scapula_left (-0.103721 -0.0485235 0.119606)
      PathWrap: wrap_object=SpineCyl3_RMJ1_left
    Thelen2003Muscle RMJ2_left: max_isometric_force=111.5701 optimal_fiber_length=0.137991
        tendon_slack_length=0.04715527 pennation_angle_at_optimal=0
      PathPoint P1: thorax (-0.086745 -0.0249267 -0.00142958)
      PathPoint P2_0: scapula_left (-0.114809 -0.114 0.111365)
      PathWrap pathwrap_0: wrap_object=SpineCyl3_RMJ2_1_left method=hybrid
      PathWrap: wrap_object=SpineCyl3_RMJ2_left
    Thelen2003Muscle SRA1_left: max_isometric_force=365.1178 optimal_fiber_length=0.08566599
        tendon_slack_length=0.070175 pennation_angle_at_optimal=0
      PathPoint P1: thorax (-0.000941264 -0.0560017 -0.119468)
      PathPoint P2: scapula_left (-0.10086 -0.0542434 0.113174)
      PathWrap: wrap_object=SRACyl_left
    Thelen2003Muscle SRA2_left: max_isometric_force=179.9626 optimal_fiber_length=0.1001066
        tendon_slack_length=0.03780487 pennation_angle_at_optimal=0
      PathPoint P1: thorax (-0.000624088 -0.101712 -0.137421)
      PathPoint P2: scapula_left (-0.106888 -0.0715149 0.113108)
      PathWrap: wrap_object=SRACyl_SRA2_left method=hybrid range=(-1 2)
      PathWrap pathwrap_0: wrap_object=SRACyl_SRA2_2_left method=hybrid range=(1 -1)
    Thelen2003Muscle SRA3_left: max_isometric_force=377.9217 optimal_fiber_length=0.1526337
        tendon_slack_length=0.009322368 pennation_angle_at_optimal=0
      PathPoint P1: thorax (-0.0113401 -0.161343 -0.148432)
      PathPoint P2: scapula_left (-0.111231 -0.088884 0.112791)
      PathWrap: wrap_object=ThoraxSRA2_left method=hybrid
    Thelen2003Muscle SBCL_left: max_isometric_force=195.8076 optimal_fiber_length=0.02317102
        tendon_slack_length=0.04224757 pennation_angle_at_optimal=0
      PathPoint P1: thorax (-0.000925142 -0.0131603 -0.0390115)
      PathPoint P2: clavicle_left (-0.0151524 0.008742 -0.0728472)
    Thelen2003Muscle PMN_left: max_isometric_force=218.7229 optimal_fiber_length=0.1181195
        tendon_slack_length=0.004316568 pennation_angle_at_optimal=0
      PathPoint P1: thorax (0.0323499 -0.0748581 -0.089156)
      PathPoint P2: scapula_left (0.0137771 -0.0473818 0.0304474)
    Thelen2003Muscle DELT1_left: max_isometric_force=556.8 optimal_fiber_length=0.17791 tendon_slack_length=0.03178415
        pennation_angle_at_optimal=0.3839724
      PathPoint P1: clavicle_left (-0.0232548 0.0185552 -0.0952719)
      PathPoint P2: clavicle_left (-0.00221954 0.0303141 -0.12568)
      PathPoint P3: humerus_left (0.00454575 -0.103644 -0.00773243)
    Thelen2003Muscle DELT2_left: max_isometric_force=1098.4 optimal_fiber_length=0.1372467
        tendon_slack_length=0.04862992 pennation_angle_at_optimal=0.2617994
      PathPoint P1: scapula_left (-0.0316063 -0.00367643 -0.00163757)
      PathPoint P2: scapula_left (-0.0317357 -0.00555618 -0.0210803)
      PathPoint P3: humerus_left (-0.00348999 -0.057778 -0.028278)
      PathPoint P4: humerus_left (0.00454575 -0.103644 -0.00773243)
    Thelen2003Muscle DELT3_left: max_isometric_force=944.7 optimal_fiber_length=0.1323062 tendon_slack_length=0.1050477
        pennation_angle_at_optimal=0.3141593
      PathPoint P1: scapula_left (-0.0678093 -0.00180103 0.0441564)
      PathPoint P2: scapula_left (-0.0828787 -0.0272329 -0.00686248)
      PathPoint P3: humerus_left (-0.01853 -0.0495563 -0.00588334)
      PathPoint P4: humerus_left (0.00454575 -0.103644 -0.00773243)
    Thelen2003Muscle SUPSP_left: max_isometric_force=410.7 optimal_fiber_length=0.1297634
        tendon_slack_length=0.02762345 pennation_angle_at_optimal=0.122173
      PathPoint P1: scapula_left (-0.076968 -0.0133058 0.074049)
      PathPoint P2: scapula_left (-0.0644995 -0.0015351 0.0467318)
      PathPoint P3: humerus_left (0.00355535 0.0311398 -0.00550133)
      PathPoint P4: humerus_left (0.0142131 0.0167949 -0.0208824)
      PathWrap: wrap_object=SUPSP_left method=hybrid
    Thelen2003Muscle INFSP_left: max_isometric_force=864.6 optimal_fiber_length=0.1480408
        tendon_slack_length=0.03770957 pennation_angle_at_optimal=0.3228859
      PathPoint P1: scapula_left (-0.101015 -0.0626317 0.079624)
      PathPoint P2: scapula_left (-0.0489821 -0.0556659 0.0251489)
      PathPoint P3: humerus_left (-0.00508263 0.0080173 -0.0263193)
      PathWrap: wrap_object=INFSPCyl_left range=(-1 2)
      PathWrap pathwrap_0: wrap_object=INFSP_and_TMIN_hum_left range=(2 -1)
    Thelen2003Muscle SUBSC_left: max_isometric_force=944.3 optimal_fiber_length=0.1816407
        tendon_slack_length=0.008347458 pennation_angle_at_optimal=0.3490659
      PathPoint P1: scapula_left (-0.0826627 -0.0447756 0.0746261)
      PathPoint P2: scapula_left (-0.0449006 -0.0370696 0.0383135)
      PathPoint P3: humerus_left (0.00740965 0.0103442 0.022619)
      PathPoint P4: humerus_left (0.0199409 -0.00828737 0.0017436)
    Thelen2003Muscle TMIN_left: max_isometric_force=605.4 optimal_fiber_length=0.05052027 tendon_slack_length=0.1157617
        pennation_angle_at_optimal=0.418879
      PathPoint P1: scapula_left (-0.0941441 -0.0774746 0.0469922)
      PathPoint P2: scapula_left (-0.0861287 -0.060448 0.0117884)
      PathPoint P3: humerus_left (-0.00845246 -0.0141352 -0.0268061)
      PathPoint P4: humerus_left (0.00653711 -0.00364346 -0.0216146)
    Thelen2003Muscle TMAJ_left: max_isometric_force=234.9 optimal_fiber_length=0.1631319 tendon_slack_length=0.06311372
        pennation_angle_at_optimal=0.2792527
      PathPoint P1: scapula_left (-0.120216 -0.123715 0.0816932)
      PathPoint P2: scapula_left (-0.0520682 -0.121946 0.00283755)
      PathPoint P3: humerus_left (0.00368816 -0.0448681 0.00674322)
    Thelen2003Muscle PECM1_left: max_isometric_force=983.4 optimal_fiber_length=0.1039118
        tendon_slack_length=0.04866114 pennation_angle_at_optimal=0.296706
      PathPoint P1: clavicle_left (0.00106363 0.00585337 -0.0493812)
      PathPoint P2: clavicle_left (-0.000467462 0.00535981 -0.056924)
      PathPoint P3: humerus_left (0.0159531 -0.040377 -0.00498534)
    Thelen2003Muscle PECM2_left: max_isometric_force=699.7 optimal_fiber_length=0.1375146
        tendon_slack_length=0.09380461 pennation_angle_at_optimal=0.4363323
      PathPoint P1: thorax (0.0247929 -0.0474437 -0.0174152)
      PathPoint P2: thorax (0.0421932 -0.0433438 -0.0805756)
      PathPoint P3: humerus_left (0.0159531 -0.0353917 -0.00498534)
    Thelen2003Muscle PECM3_left: max_isometric_force=446.7 optimal_fiber_length=0.176252 tendon_slack_length=0.09604906
        pennation_angle_at_optimal=0.4363323
      PathPoint P1: thorax (0.0624706 -0.147326 -0.0219955)
      PathPoint P2: thorax (0.0431414 -0.0927882 -0.0825902)
      PathPoint P3: humerus_left (0.0159531 -0.0299121 -0.00498534)
    Thelen2003Muscle LAT_left: max_isometric_force=1129.7 optimal_fiber_length=0.2261084 tendon_slack_length=0.07514176
        pennation_angle_at_optimal=0.3316126
      PathPoint P1: thorax (-0.0944244 -0.160526 -0.000510643)
      PathPoint P2: humerus_left (0.0020154 -0.0188354 0.0214022)
      PathPoint P3: humerus_left (0.00988845 -0.0222682 0.00879614)
      PathWrap: wrap_object=ThoraxLAT_left method=hybrid
    Thelen2003Muscle CORB_left: max_isometric_force=306.9 optimal_fiber_length=0.08343138
        tendon_slack_length=0.06167103 pennation_angle_at_optimal=0
      PathPoint P1: scapula_left (0.0143512 -0.0473818 0.0304474)
      PathPoint P3: humerus_left (0 -0.127625 0.0116252)
      PathWrap: wrap_object=CORBhum_left
      PathWrap pathwrap_0: wrap_object=TMAJ_LAT_PEC_CORBhh_left
    Thelen2003Muscle bic_l_left: max_isometric_force=700 optimal_fiber_length=0.1446988 tendon_slack_length=0.2615106
        pennation_angle_at_optimal=0
      PathPoint P1: scapula_left (-0.0136 -0.0251 0.0218)
      PathPoint P2: humerus_left (0.015 0.01 -0.015)
      PathPoint P3: radius_left (0.000914 -0.037639 0.003846)
      PathWrap: wrap_object=WP_humerus_torus_BICl_left method=hybrid range=(-1 2)
      PathWrap pathwrap_0: wrap_object=WP_humerus_torus_middle_left method=hybrid range=(2 3)
      PathWrap pathwrap_1: wrap_object=Elbow_BIC_BRD_left method=hybrid
    Thelen2003Muscle bic_b_left: max_isometric_force=894 optimal_fiber_length=0.1308 tendon_slack_length=0.2165
        pennation_angle_at_optimal=0
      PathPoint P1: scapula_left (0.01182 -0.04094 0.02483)
      PathPoint P2: radius_left (0.000914 -0.037639 0.003846)
      PathWrap: wrap_object=WP_humerus_torus_middle_b_left method=hybrid
      PathWrap pathwrap_0: wrap_object=Elbow_BIC_BRD_b_left method=hybrid
    Thelen2003Muscle tric_long_left: max_isometric_force=2216 optimal_fiber_length=0.1167 tendon_slack_length=0.2338
        pennation_angle_at_optimal=0.1745329
      PathPoint P1: scapula_left (-0.045508 -0.044998 0.01182)
      PathPoint P2: humerus_left (-0.022605 -0.28 0.0145687)
      PathPoint P3: ulna_left (-0.027814 -0.009128 0.000839)
      PathWrap: wrap_object=TRIlonghh_left method=hybrid
      PathWrap pathwrap_0: wrap_object=WP_ulna_TRI_left method=hybrid
    Thelen2003Muscle tric_lat_left: max_isometric_force=624.3 optimal_fiber_length=0.0861 tendon_slack_length=0.1017
        pennation_angle_at_optimal=0.17
      PathPoint P1: humerus_left (-0.00651919 -0.137632 -0.00465811)
      PathPoint P2: humerus_left (-0.02657807 -0.267438 0.0114385)
      PathPoint P3: ulna_left (-0.0220302 0.0105221 0.000784636)
    Thelen2003Muscle tric_med_left: max_isometric_force=624.3 optimal_fiber_length=0.0861 tendon_slack_length=0.0941
        pennation_angle_at_optimal=0.157
      PathPoint P1: humerus_left (-0.00912031 -0.149048 0.00986038)
      PathPoint P2: humerus_left (-0.0346529 -0.246369 0.0132452)
      PathPoint P3: humerus_left (-0.02984659 -0.2734856 0.0131472)
      PathPoint P4: ulna_left (-0.02202687 -0.006127795 -0.000784636)
    ObjectGroup new_Mick_left: members=(bic_l_left bic_b_left tric_long_left)
    ObjectGroup Scapulothoracic_left: members=(SBCL_left SRA1_left SRA2_left SRA3_left TRP1_left TRP2_left TRP3_left TRP4_left LVS_left RMN_left RMJ1_left RMJ2_left PMN_left)
    ObjectGroup Glenohumeral_left: members=(DELT1_left DELT2_left DELT3_left INFSP_left LAT_left PECM1_left PECM2_left PECM3_left SUBSC_left SUPSP_left TMAJ_left TMIN_left CORB_left)
  MarkerSet:
    Marker STER: thorax (0.01319851 -0.01722405 -0.0002904621)
    Marker XIPH: thorax (0.07053759 -0.1474103 -0.0008509)
    Marker C7: thorax (-0.09257033 0.05305524 -0.002136034)
    Marker T10: thorax (-0.1133996 -0.1568997 0.002846836)
    Marker CLAV_SC: clavicle_left (0.002054328 -0.0003929417 -0.001373775)
    Marker CLAV_AC: clavicle_left (-0.01433727 0.02104944 -0.1203463)
    Marker SCAP_AA: scapula_left (-0.05332016 -0.007246225 -5.060976e-5) fixed=true
    Marker SCAP_IA: scapula_left (-0.128701 -0.1309085 0.09165799)
    Marker SCAP_TS: scapula_left (-0.09926427 -0.02330526 0.1085185)
    Marker DELT: humerus_left (0.0005875146 -0.1146985 -0.02653767)
    Marker EPICl: humerus_left (0.00676215 -0.2841633 -0.02133308)
    Marker EPICM: humerus_left (0.001379279 -0.2838127 0.04436061)
    Marker ARMl: humerus_left (-0.001789485 -0.1650035 -0.02372924)
    Marker ELBOW: ulna_left (-0.02935292 -0.005914286 0.002742912)
    Marker STYLu: ulna_left (-0.004320087 -0.2438233 -0.0501776)
    Marker STYLr: radius_left (0.03927008 -0.2336129 -0.03098414)
    Marker larm_l: radius_left (0.002854409 -0.1204194 -0.03427663)
