# OpenSim document version 40000
InverseKinematicsTool:
  results_directory: ./
  constraint_weight: Inf
  accuracy: 1e-5
  marker_file: P4_gear_20_from_depth.trc
  time_range: 0 121.075
  report_errors: true
  report_marker_locations: false
  IKTaskSet:
    IKMarkerTask STER: apply=false weight=1
    IKMarkerTask XIPH: apply=false weight=1
    IKMarkerTask C7: apply=true weight=1
    IKMarkerTask T5: apply=true weight=1
    IKMarkerTask CLAV_SC: apply=false weight=1
    IKMarkerTask CLAV_AC: apply=true weight=1
    IKMarkerTask SCAP_AA: apply=true weight=1
    IKMarkerTask SCAP_TS: apply=true weight=1
    IKMarkerTask SCAP_IA: apply=true weight=1
    IKMarkerTask DELT: apply=true weight=1
    IKMarkerTask EPICl: apply=true weight=1
    IKMarkerTask EPICM: apply=false weight=1
    IKMarkerTask ARMl: apply=true weight=1
    IKMarkerTask ELB: apply=false weight=1
    IKMarkerTask STYLr: apply=true weight=1
    IKMarkerTask STYLu: apply=true weight=1
    IKMarkerTask larm_l: apply=true weight=1
    IKMarkerTask RIBS_r: apply=true weight=1
