# OpenSim document version 40000
InverseKinematicsTool P4_seated_anato_from_depth:
  results_directory: ik_files_depth
  constraint_weight: Inf
  accuracy: 1e-5
  time_range: 0 4.407
  output_motion_file: ik_files_depth\P4_seated_anato_from_depth.mot
  report_errors: true
  marker_file: P4_seated_anato_from_depth.trc
  report_marker_locations: false
  IKTaskSet:
    IKMarkerTask STER: apply=false weight=1
    IKMarkerTask XIPH: apply=false weight=1
    IKMarkerTask C7: apply=true weight=1
    IKMarkerTask T5: apply=true weight=1
    IKMarkerTask CLAV_SC: apply=false weight=1
    IKMarkerTask CLAV_AC: apply=true weight=1
    IKMarkerTask SCAP_AA: apply=true weight=1
    IKMarkerTask SCAP_TS: apply=true weight=1
    IKMarkerTask SCAP_IA: apply=true weight=1
    IKMarkerTask DELT: apply=true weight=1
    IKMarkerTask EPICl: apply=true weight=1
    IKMarkerTask EPICM: apply=false weight=1
    IKMarkerTask ARMl: apply=true weight=1
    IKMarkerTask ELB: apply=false weight=1
    IKMarkerTask STYLr: apply=true weight=1
    IKMarkerTask STYLu: apply=true weight=1
    IKMarkerTask larm_l: apply=true weight=1
    IKMarkerTask RIBS_r: apply=true weight=1
