# OpenSim document version 40000
ScaleTool WUShoulderModel_S2M_box_lifting_py2-scaled:
  mass: 24.405 [kg]
  height: -1
  age: -1
  ModelScaler:
    apply: true
    scaling_order: measurements manualScale
    marker_file: markers_07-06-2023_14_47_31.trc
    time_range: 0 1
    preserve_mass_distribution: false
    MeasurementSet:
      Measurement thorax_x: apply=true
        MarkerPair: markers=(C7 T10)
        BodyScale thorax: axes=(X Y Z)
      Measurement humx: apply=true
        MarkerPair: markers=(Acrom EPICl)
        BodyScale clavicle: axes=(X Y Z)
        BodyScale humerus: axes=(X Y Z)
      Measurement scapx: apply=true
        MarkerPair: markers=(SCAP_AA SCAP_IA)
        BodyScale scapula: axes=(X Z)
      Measurement scapy: apply=true
        MarkerPair: markers=(Acrom SCAP_AA)
        BodyScale scapula: axes=Y
      Measurement ulna: apply=true
        MarkerPair: markers=(EPICl STYLu)
        BodyScale ulna: axes=(X Y Z)
        BodyScale radius: axes=(X Y Z)
      Measurement rady: apply=false
        MarkerPair: markers=(STYLr STYLu)
      Measurement Unnamed: apply=false
    ScaleSet:
      Scale: scales=(1 1 1) segment=clavicle apply=true
  MarkerPlacer:
    apply: false
    marker_file: markers_07-06-2023_14_47_31.trc
    coordinate_file: pos_cycl.mot
    time_range: 0 1
    max_marker_movement: -1
    IKTaskSet:
      IKMarkerTask C7: apply=true weight=1
      IKMarkerTask T10: apply=true weight=1
      IKMarkerTask EPICl: apply=true weight=1
      IKMarkerTask STYLr: apply=true weight=1
      IKMarkerTask STYLu: apply=true weight=1
      IKMarkerTask SCAP_IA: apply=true weight=1
      IKMarkerTask Acrom: apply=true weight=1
      IKMarkerTask SCAP_AA: apply=true weight=1
      IKMarkerTask CLAV_AC: apply=true weight=0.1
      IKMarkerTask DELT: apply=true weight=1
      IKMarkerTask ARMl: apply=true weight=0.01
      IKMarkerTask T5: apply=true weight=1
      IKMarkerTask larm_l: apply=true weight=0.01
      IKMarkerTask RIBS_r: apply=true weight=0.01
      IKCoordinateTask [values shared by the 16 below unless stated]: apply=true weight=1 value_type=from_file value=0
      IKCoordinateTask thorax_tilt
      IKCoordinateTask thorax_list
      IKCoordinateTask thorax_rotation
      IKCoordinateTask thorax_tx
      IKCoordinateTask thorax_ty
      IKCoordinateTask thorax_tz
      IKCoordinateTask sternoclavicular_r1
      IKCoordinateTask sternoclavicular_r2
      IKCoordinateTask Acromioclavicular_r1
      IKCoordinateTask Acromioclavicular_r2
      IKCoordinateTask Acromioclavicular_r3
      IKCoordinateTask shoulder_plane
      IKCoordinateTask shoulder_ele
      IKCoordinateTask shoulder_rotation
      IKCoordinateTask elbow_flexion
      IKCoordinateTask pro_sup
