# OpenSim document version 40000
ScaleTool WUShoulderModel_S2M_box_lifting_py2-scaled:
  mass: 24.405 [kg]
  height: -1
  age: -1
  ModelScaler:
    apply: true
    scaling_order: measurements manualScale
    marker_file: markers_depth_06-07-2023_18_17_59.trc
    time_range: 0 0.5
    preserve_mass_distribution: false
    MeasurementSet:
      Measurement thorax_x: apply=true
        MarkerPair: markers=(C7 T5)
        BodyScale thorax: axes=X
      Measurement humx: apply=true
        MarkerPair: markers=(Acrom EPICl)
        BodyScale humerus_left: axes=(X Y Z)
      Measurement scapx: apply=false
        MarkerPair: markers=(Acrom CLAV_AC)
      Measurement scapy: apply=true
        MarkerPair: markers=(SCAP_IA SCAP_AA)
        BodyScale scapula_left: axes=(X Y Z)
      Measurement ulna: apply=true
        MarkerPair: markers=(EPICl STYLu)
        BodyScale ulna_left: axes=(X Y Z)
        BodyScale radius_left: axes=(X Y Z)
      Measurement scapz: apply=false
        MarkerPair: markers=(Acrom SCAP_AA)
      Measurement thoraxz: apply=true
        MarkerPair: markers=(RIBS_r T5)
        BodyScale thorax: axes=(Y Z)
    ScaleSet:
      Scale: scales=(1 1 1) segment=clavicle_left apply=true
      Scale: scales=(1 1 1) segment=hand_left apply=true
  MarkerPlacer:
    apply: true
    marker_file: markers_depth_06-07-2023_18_17_59.trc
    coordinate_file: depth_mov.mot
    time_range: 0 0.5
    max_marker_movement: -1
    IKTaskSet:
      IKMarkerTask C7: apply=true weight=1
      IKMarkerTask T5: apply=true weight=1
      IKMarkerTask CLAV_AC: apply=true weight=10
      IKMarkerTask Acrom: apply=true weight=10
      IKMarkerTask SCAP_AA: apply=true weight=10
      IKMarkerTask SCAP_IA: apply=true weight=10
      IKMarkerTask DELT: apply=true weight=10
      IKMarkerTask EPICl: apply=true weight=10
      IKMarkerTask ARMl: apply=true weight=10
      IKMarkerTask STYLr: apply=true weight=1
      IKMarkerTask STYLu: apply=true weight=1
      IKMarkerTask larm_l: apply=true weight=10
      IKMarkerTask RIBS_r: apply=true weight=1
      IKCoordinateTask [values shared by the 14 below unless stated]: apply=true weight=1 value_type=from_file value=0
      IKCoordinateTask thorax_tilt
      IKCoordinateTask thorax_list
      IKCoordinateTask thorax_rotation
      IKCoordinateTask thorax_tx
      IKCoordinateTask thorax_ty
      IKCoordinateTask thorax_tz
      IKCoordinateTask Acromioclavicular_left_r1
      IKCoordinateTask Acromioclavicular_left_r2
      IKCoordinateTask Acromioclavicular_left_r3
      IKCoordinateTask shoulder_left_plane
      IKCoordinateTask shoulder_left_ele
      IKCoordinateTask shoulder_left_rotation
      IKCoordinateTask elbow_left_flexion
      IKCoordinateTask pro_sup_left
